<?xml version="1.0"?>

<flight_control name="F-16 FC">

<!--
    begin: control system by Nikolai V. Chr.

    AD-A055-417 - Main source.
    AD-A189-675 - I wish, too blurred to read.
    TP-1538 - used for control system B/C and non-prototype gains.
    TN-D-8176 - used for servodynamic filters. Disabled for now (fdm rate is only 120Hz).
    ICAS-90-5.10.2 - used for MPO switch
 -->

    <channel execrate="1" name="FCS Lookup">

        <switch name="fcs/fly-by-wire/MLG-GND">
            <description>
                Main landing gear on ground
            </description>
            <default value="0"/>
            <test logic="AND" value="1">
                gear/unit[1]/WOW eq 1
                gear/unit[2]/WOW eq 1
            </test>
        </switch>

        <switch name="fcs/fly-by-wire/condition-a">
            <default value="0"/>
            <test logic="OR" value="1">
                gear/gear-cmd-norm == 1
                /controls/flight/flaps gt 0
            </test>
            <test logic="AND" value="1">
                /systems/refuel/serviceable == 1
                fcs/fly-by-wire/q_c lt 646
            </test>
        </switch>

        <fcs_function name="fcs/fly-by-wire/enable-standby-gains-inv">
            <function>
                <difference>
                    <v>1</v>
                    <p>fcs/fly-by-wire/enable-standby-gains</p>
                </difference>
            </function>
        </fcs_function>

        <switch name="fcs/fly-by-wire/q_c_standby">
            <description>
                pound per square feet
            </description>
            <default value="1400"/>
            <test logic="AND" value="200">
                fcs/fly-by-wire/condition-a == 1
            </test>
        </switch>

        <fcs_function name="fcs/fly-by-wire/q_c">
            <description>
                Dynamic pressure. Pound per square feet
            </description>
            <function>
                <sum>
                    <product>
                        <p>fcs/fly-by-wire/q_c_standby</p><!-- standby gain-->
                        <p>fcs/fly-by-wire/enable-standby-gains</p>
                    </product>
                    <product>
                        <p>aero/qbar-psf</p>
                        <p>fcs/fly-by-wire/enable-standby-gains-inv</p>
                    </product>
                </sum>
            </function>
        </fcs_function>

        <fcs_function name="fcs/fly-by-wire/q_c_Nsqm">
            <description>
                Newton per square meter
            </description>
            <function>
                <product>
                    <p>fcs/fly-by-wire/q_c</p>
                    <v>47.880258889</v>
                </product>
            </function>
        </fcs_function>

        <fcs_function name="fcs/fly-by-wire/P_s">
            <description>
                Static pressure. Pound per square feet
            </description>
            <function>
                <sum>
                    <product>
                        <v>2116</v><!-- standby gain-->
                        <p>fcs/fly-by-wire/enable-standby-gains</p>
                    </product>
                    <product>
                        <p>atmosphere/P-psf</p>
                        <p>fcs/fly-by-wire/enable-standby-gains-inv</p>
                    </product>
                </sum>
            </function>
        </fcs_function>

        <fcs_function name="fcs/fly-by-wire/qcps-ratio">
            <function>
                <quotient>
                    <p>fcs/fly-by-wire/q_c</p>
                    <p>fcs/fly-by-wire/P_s</p>
                </quotient>
            </function>
        </fcs_function>

        <fcs_function name="fcs/fly-by-wire/pitch/F1">
            <description>Stick limit</description>
            <function>
                <table>
                <independentVar lookup="row">fcs/fly-by-wire/q_c</independentVar>
                <tableData>
                    34     -1
                    184    -4
                </tableData>
            </table>
            </function>
        </fcs_function>

        <fcs_function name="fcs/fly-by-wire/pitch/F2">
            <description>Static stability
                         TP-1538: simplified to 0.5
            </description>
            <function>
                <table>
                <independentVar lookup="row">fcs/fly-by-wire/qcps-ratio</independentVar>
                <tableData>
                    0     0.50
                    0.53  0.50
                    1.79 -1.00
                </tableData>
            </table>
            </function>
        </fcs_function>

        <fcs_function name="fcs/fly-by-wire/pitch/F3">
            <description>Pitch rate gain and pitch loop gain schedule.</description>
            <function>
                <table>
                    <independentVar lookup="row">fcs/fly-by-wire/q_c</independentVar>
                    <tableData>
                        0.0 1
                        300 1
                        800 0.533
                        3000 0.083
                    </tableData>
                </table>
            </function>
        </fcs_function>

        <fcs_function name="fcs/fly-by-wire/pitch/F3-loop-alt">
            <description>
                TP-1538: pitch loop gain schedule.

                Not used
            </description>
            <function>
                <table>
                    <independentVar lookup="row">fcs/fly-by-wire/q_c_Nsqm</independentVar>
                    <tableData>
                        0.0   1.0
                        13000 1.0
                        43000 0.4
                    </tableData>
                </table>
            </function>
        </fcs_function>

        <fcs_function name="fcs/fly-by-wire/pitch/F3-rate-alt">
            <description>
                TP-1538: Pitch rate gain schedule.

                Not used
            </description>
            <function>
                <table>
                    <independentVar lookup="row">fcs/fly-by-wire/q_c_Nsqm</independentVar>
                    <tableData>
                        0.0   1.0
                        5500  1.0
                        15500 0.3
                    </tableData>
                </table>
            </function>
        </fcs_function>

        <fcs_function name="fcs/fly-by-wire/ari/F7">
            <description>Turn coordination
                         TP-1538 is almost same.
            </description>
            <function>
                <table>
                    <independentVar lookup="row">fcs/fly-by-wire/qcps-ratio</independentVar>
                    <tableData>
                        0.0   0
                        0.187 0
                        1.129 1
                        1.709 1
                        3.29  0
                    </tableData>
                </table>
            </function>
        </fcs_function>

        <fcs_function name="fcs/fly-by-wire/yaw/F8">
            <description>Yaw axis
                         TP-1538 is simplified to 0.5
            </description>
            <function>
                <table>
                    <independentVar lookup="row">fcs/fly-by-wire/qcps-ratio</independentVar>
                    <tableData>
                        0.0  0.5
                        2.04 0.5
                        3.23 1.0
                    </tableData>
                </table>
            </function>
        </fcs_function>

        <fcs_function name="fcs/fly-by-wire/tef/F9">
            <description>Transonic flaps</description>
            <function>
                <table>
                    <independentVar lookup="row">fcs/fly-by-wire/qcps-ratio</independentVar>
                    <tableData>
                        0.0  0
                        0.787 0
                        1.008 -2.0
                    </tableData>
                </table>
            </function>
        </fcs_function>

        <fcs_function name="fcs/fly-by-wire/roll/F10">
            <description>Roll horiz tail
                         TP-1538 is simplified to 0.25
            </description>
            <function>
                <table>
                    <independentVar lookup="row">fcs/fly-by-wire/qcps-ratio</independentVar>
                    <tableData>
                        0.0   0.25
                        0.694 0.25
                        1.132 0.50
                    </tableData>
                </table>
            </function>
        </fcs_function>

        <fcs_function name="accelerations/a_n">
            <description>
                Page 43: Calc of G-force.

                I had some trouble using the Nz, but don't remember what it was.
            </description>
            <function>
                <quotient>
                    <sum>
                        <product>
                            <property> velocities/q-rad_sec </property>
                            <property> velocities/u-fps </property>
                        </product>
                        <product>
                            <v>-1</v>
                            <property> velocities/p-rad_sec </property>
                            <property> velocities/v-fps </property>
                        </product>
                        <product>
                            <v> 32.174 </v>
                            <cos>
                                <property> attitude/theta-rad </property>
                            </cos>
                            <cos>
                                <property> attitude/phi-rad </property>
                            </cos>
                        </product>
                        <product>
                            <v>-1</v>
                            <property> accelerations/wdot-ft_sec2 </property>
                        </product>
                    </sum>
                    <v> 32.174 </v>
                </quotient>
            </function>
        </fcs_function>

        <fcs_function name="accelerations/a_y">
            <description>
                Page 43: Calc of lateral G-force.

                I had some trouble using the Ny. Its feedback made rudder oscillate at very high speeds.
            </description>
            <function>
                <quotient>
                    <sum>
                        <product>
                            <property> velocities/p-rad_sec </property>
                            <property> velocities/w-fps </property>
                            <v>-1</v>
                        </product>
                        <product>
                            <property> velocities/r-rad_sec </property>
                            <property> velocities/u-fps </property>
                        </product>
                        <product>
                            <v>-1</v>
                            <v> 32.174 </v>
                            <cos>
                                <property> attitude/theta-rad </property>
                            </cos>
                            <sin>
                                <property> attitude/phi-rad </property>
                            </sin>
                        </product>
                        <property> accelerations/vdot-ft_sec2 </property>
                    </sum>
                    <v> 32.174 </v>
                </quotient>
            </function>
        </fcs_function>

    </channel>


    <channel execrate="1" name="Roll">

        <fcs_function name="fcs/aileron-cmd-pow-norm">
            <function>
                    <ifthen>
                        <lt>
                            <p> fcs/aileron-cmd-norm </p>
                            <v> 0 </v>
                        </lt>
                        <product>
                            <v> -1 </v>
                            <pow>
                                <abs>
                                    <p>fcs/aileron-cmd-norm</p>
                                </abs>
                                <v>1.3</v>
                            </pow>
                        </product>
                        <pow>
                            <p>fcs/aileron-cmd-norm</p>
                            <v>1.3</v>
                        </pow>
                    </ifthen>
            </function>
        </fcs_function>

        <fcs_function name="fcs/fly-by-wire/roll/stick-force-lbf">
            <function>
                <table>
                    <independentVar lookup="row">fcs/aileron-cmd-pow-norm</independentVar>
                    <tableData>
                       -1 -17
                        0   0
                        1  17
                    </tableData>
                </table>
            </function>
        </fcs_function>

        <fcs_function name="fcs/fly-by-wire/roll/control-c/pressure-input">
            <function>
                <product>
                    <min>
                        <sum>
                            <p>fcs/fly-by-wire/q_c_Nsqm</p>
                            <v>-10500</v>
                        </sum>
                        <v>0</v>
                    </min>
                    <v>-0.0115</v>
                </product>
            </function>
        </fcs_function>

        <fcs_function name="fcs/fly-by-wire/roll/control-c/alpha-input">
            <function>
                <product>
                    <max>
                        <sum>
                            <p>fcs/fly-by-wire/pitch/a_f</p>
                            <v>-15</v>
                        </sum>
                        <v>0</v>
                    </max>
                    <v>4</v>
                </product>
            </function>
        </fcs_function>

        <fcs_function name="fcs/fly-by-wire/roll/control-c/elevator-cmd-input">
            <description>
                The -1 factor was removed since it was wrong. When more than
                5 deg nosedown elev is commanded this comes into effect.
            </description>
            <function>
                <product>
                    <max>
                        <sum>
                            <!--<product>-->
                                <p>fcs/fly-by-wire/pitch/integrator-final</p>
                                <!--<v>-1</v>
                            </product>-->
                            <v>-5</v>
                        </sum>
                        <v>0</v>
                    </max>
                    <v>4</v>
                </product>
            </function>
        </fcs_function>

        <summer name="fcs/fly-by-wire/roll/control-c/input-sum">
            <input>fcs/fly-by-wire/roll/control-c/pressure-input</input>
            <input>fcs/fly-by-wire/roll/control-c/alpha-input</input>
            <input>fcs/fly-by-wire/roll/control-c/elevator-cmd-input</input>
        </summer>

        <fcs_function name="fcs/fly-by-wire/roll/control-c/scheduled-gain-limited">
            <function>
                <min>
                    <v>228</v>
                    <product>
                        <table>
                            <independentVar lookup="row">fcs/fly-by-wire/pitch/control-c/roll-rate-abs</independentVar>
                            <tableData>
                                30 1 <!-- changed to 1 due to FG pilots use stick not pressure sticks -->
                                50 1
                            </tableData>
                        </table>
                        <p>fcs/fly-by-wire/roll/control-c/input-sum</p>
                    </product>
                </min>
            </function>
        </fcs_function>

        <fcs_function name="fcs/fly-by-wire/roll/control-c/max-cmd-roll-rate">
            <function>
                <difference>
                    <v>308</v>
                    <p>fcs/fly-by-wire/roll/control-c/scheduled-gain-limited</p>
                </difference>
            </function>
        </fcs_function>

        <switch name="fcs/fly-by-wire/roll/max-cmd-roll-rate">
            <default value="308"/>
            <test logic="OR" value="fcs/fly-by-wire/roll/control-c/max-cmd-roll-rate">
                fcs/fly-by-wire/enable-control-c == 1
            </test>
        </switch>

        <fcs_function name="fcs/fly-by-wire/roll/min-cmd-roll-rate">
            <function>
                <quotient>
                    <p>fcs/fly-by-wire/roll/max-cmd-roll-rate</p>
                    <v>308</v>
                </quotient>
            </function>
        </fcs_function>

        <fcs_function name="fcs/fly-by-wire/roll/command-deg_s">
            <function>
                <product>
                <table>
                    <independentVar lookup="row">fcs/fly-by-wire/roll/stick-force-lbf</independentVar>
                    <tableData>
                         -17  -308
                         -11   -80
                          -6   -20
                          -1     0
                           0     0
                           1     0
                           6    20
                          11    80
                          17   308
                    </tableData>
                </table>
                <p>fcs/fly-by-wire/roll/min-cmd-roll-rate</p>
                </product>
            </function>
        </fcs_function>

        <fcs_function name="fcs/fly-by-wire/roll/command-limited-deg_s">
            <function>
                <product>
                    <table>
                        <independentVar lookup="row">fcs/fly-by-wire/enable-cat-III</independentVar>
                        <tableData>
                             0  1
                             1  0.6
                        </tableData>
                    </table>
                    <!--<table>  this is already done in fcs/fly-by-wire/roll/gain-switch
                        <independentVar lookup="row">gear/gear-pos-norm</independentVar>
                        <tableData>
                             0  1
                             1  0.542208
                        </tableData>
                    </table>-->
                    <p>fcs/fly-by-wire/roll/command-deg_s</p>
                </product>
            </function>
        </fcs_function>

        <aerosurface_scale name="fcs/fly-by-wire/roll/trim-scaled">
            <input>fcs/roll-trim-cmd-norm</input>
            <zero_centered> true </zero_centered>
            <domain>
                <min> -1.0 </min>
                <max>  1.0 </max>
            </domain>
            <range>
                <min> -40 </min>
                <max>  40 </max>
            </range>
        </aerosurface_scale>

        <switch name="fcs/fly-by-wire/roll/gain-switch">
            <default value="1.0"/>
            <test logic="OR" value="0.542">
                fcs/fly-by-wire/condition-a == 1
            </test>
        </switch>

        <pure_gain name="fcs/fly-by-wire/roll/ground-gain">
            <input>fcs/fly-by-wire/roll/command-limited-deg_s</input>
            <gain> fcs/fly-by-wire/roll/gain-switch </gain>
        </pure_gain>

        <summer name="fcs/fly-by-wire/roll/loop-sum">
            <input>fcs/fly-by-wire/roll/ground-gain</input>
            <input>-fcs/fly-by-wire/roll/loop-top-lead</input>
            <input>-fcs/fly-by-wire/roll/loop-bottom-lead</input>
        </summer>

        <lag_filter name="fcs/fly-by-wire/roll/loop-lag">
            <input> fcs/fly-by-wire/roll/loop-sum </input>
            <c1> 10 </c1>
        </lag_filter>

        <summer name="fcs/fly-by-wire/roll/loop-lag-neg">
            <input>fcs/fly-by-wire/roll/loop-lag</input>
            <clipto>
                <min>-10000</min>
                <max>0</max>
            </clipto>
        </summer>

        <summer name="fcs/fly-by-wire/roll/loop-lag-pos">
            <input>fcs/fly-by-wire/roll/loop-lag</input>
            <clipto>
                <min> 0 </min>
                <max> 10000 </max>
            </clipto>
        </summer>

        <lead_lag_filter name="fcs/fly-by-wire/roll/loop-bottom-lead">
          <input> fcs/fly-by-wire/roll/loop-lag-neg </input>
          <c1> 6 </c1>
          <c2> 0 </c2>
          <c3> 1 </c3>
          <c4> 20 </c4>
          <clipto>
                <min>-10000</min>
                <max>0</max>
          </clipto>
        </lead_lag_filter>

        <lead_lag_filter name="fcs/fly-by-wire/roll/loop-top-lead">
          <input> fcs/fly-by-wire/roll/loop-lag-pos </input>
          <c1> 6 </c1>
          <c2> 0 </c2>
          <c3> 1 </c3>
          <c4> 20 </c4>
          <clipto>
            <min> 0 </min>
            <max> 10000 </max>
          </clipto>
        </lead_lag_filter>

        <summer name="fcs/fly-by-wire/roll/loop-sum-end">
            <input>-fcs/fly-by-wire/roll/loop-lag</input>
            <input>-fcs/fly-by-wire/roll/trim-gain</input>
            <input>fcs/fly-by-wire/roll/roll-filter</input>
            <input>-autoflight/roll/roll-rate-demand</input>
        </summer>

        <pure_gain name="fcs/fly-by-wire/roll/trim-gain">
            <input>fcs/fly-by-wire/roll/trim-scaled</input>
            <gain> 1.67 </gain>
        </pure_gain>

        <pure_gain name="velocities/p-deg_sec">
            <input>velocities/p-rad_sec</input>
            <gain> 57.2957795 </gain>
        </pure_gain>

        <second_order_filter name="fcs/fly-by-wire/roll/lead-exit">
            <description>
                Exit B in diagram.
            </description>
            <input> velocities/p-deg_sec </input>
            <c1> 1 </c1>
            <c2> 0 </c2>
            <c3> 3025 </c3>
            <c4> 1 </c4>
            <c5> 0 </c5>
            <c6> 3025 </c6>
        </second_order_filter>

        <second_order_filter name="fcs/fly-by-wire/roll/roll-filter">
          <input> velocities/p-deg_sec </input>
          <c1> 4 </c1>
          <c2> 64 </c2>
          <c3> 6400 </c3>
          <c4> 1 </c4>
          <c5> 80 </c5>
          <c6> 6400 </c6>
        </second_order_filter>

        <pure_gain name="fcs/fly-by-wire/roll/yaw-rate-input">
            <description>
                Is +8.34 in diagram, but must be negative to really work as flat spin protection.
                And for slow flat spins it was way too small.
            </description>
            <input> velocities/r-deg_sec </input>
            <gain> -8.34 </gain>
        </pure_gain>

        <switch name="fcs/fly-by-wire/roll/switch">
            <default value="fcs/fly-by-wire/roll/loop-sum-end"/>
            <test logic="AND" value="fcs/fly-by-wire/roll/yaw-rate-input">
                fcs/fly-by-wire/pitch/a_f ge 29
                fcs/fly-by-wire/prototype == 0
            </test>
        </switch>

        <switch name="fcs/fly-by-wire/roll/switch-elec">
            <description>
            </description>
            <default value="fcs/fly-by-wire/roll/switch"/>
            <test logic="AND" value="fcs/fly-by-wire/roll/switch-elec">
                elec/bus/flcc/b lt 20
            </test>
        </switch>

        <pure_gain name="fcs/fly-by-wire/roll/final">
            <input>fcs/fly-by-wire/roll/switch-elec</input>
            <gain> 0.12 </gain>
            <clipto>
                <min> -21.5 </min>
                <max>  21.5 </max>
            </clipto>
        </pure_gain>

        <summer name="fcs/fly-by-wire/roll/top-sum">
            <input>fcs/fly-by-wire/roll/final</input>
            <input>-fcs/fly-by-wire/roll/bottom-deadzone</input>
            <input>fcs/fly-by-wire/tef/tef-pos-deg</input>
        </summer>

        <summer name="fcs/fly-by-wire/roll/bottom-sum">
            <input>-fcs/fly-by-wire/roll/final</input>
            <input>-fcs/fly-by-wire/roll/top-deadzone</input>
            <input>fcs/fly-by-wire/tef/tef-pos-deg</input>
        </summer>

        <fcs_function name="fcs/fly-by-wire/roll/top-deadzone-pos">
            <function>
                <difference>
                    <property> fcs/fly-by-wire/roll/top-sum </property>
                    <value> 21.5 </value>
                </difference>
            </function>
        </fcs_function>

        <switch name="fcs/fly-by-wire/roll/top-deadzone">
            <default value="0"/>
            <test logic="AND" value="fcs/fly-by-wire/roll/top-deadzone-pos">
                fcs/fly-by-wire/roll/top-sum gt  21.5
            </test>
        </switch>

        <fcs_function name="fcs/fly-by-wire/roll/bottom-deadzone-pos">
            <function>
                <difference>
                    <property> fcs/fly-by-wire/roll/bottom-sum </property>
                    <value> 21.5 </value>
                </difference>
            </function>
        </fcs_function>

        <switch name="fcs/fly-by-wire/roll/bottom-deadzone">
            <default value="0"/>
            <test logic="AND" value="fcs/fly-by-wire/roll/bottom-deadzone-pos">
                fcs/fly-by-wire/roll/bottom-sum gt  21.5
            </test>
        </switch>

        <summer name="fcs/fly-by-wire/roll/bottom-limit">
            <input>fcs/fly-by-wire/roll/bottom-sum</input>
            <clipto>
                <min> -21.5 </min>
                <max>  21.5 </max>
            </clipto>
        </summer>

        <summer name="fcs/fly-by-wire/roll/top-limit">
            <input>fcs/fly-by-wire/roll/top-sum</input>
            <clipto>
                <min> -21.5 </min>
                <max>  21.5 </max>
            </clipto>
        </summer>

        <!--<second_order_filter name="fcs/fly-by-wire/roll/servodynamics-right">
            <description>
                (52)^2
                div
                (s^2+2(.7)(52)S+(52)^2
            </description>
            <input> fcs/fly-by-wire/roll/top-limit </input>
            <c1> 0 </c1>
            <c2> 0 </c2>
            <c3> 2704 </c3>
            <c4> 1 </c4>
            <c5> 72.8 </c5>
            <c6> 2704 </c6>
        </second_order_filter>-->

        <lag_filter name="fcs/fly-by-wire/roll/flaperon-right-lag">
            <description>
                Power actuator dynamics
                rate limit = 80 deg/s
            </description>
            <input> fcs/fly-by-wire/roll/top-limit </input>
            <c1> 20 </c1>
        </lag_filter>

        <fcs_function name="fcs/fly-by-wire/roll/mech-bias-right">
            <function>
                <sum>
                    <property> fcs/fly-by-wire/roll/flaperon-right-lag </property>
                    <value> -1.5 </value>
                </sum>
            </function>
        </fcs_function>

        <switch name="fcs/fly-by-wire/roll/mech-bias-hyd-right">
          <default value="0"/>
          <test  logic="OR" value="fcs/fly-by-wire/roll/mech-bias-right">
            systems/hydraulics/sysa-psi ge 2000
            systems/hydraulics/sysb-psi ge 2000
          </test>
         </switch>

        <kinematic name="fcs/fly-by-wire/roll/flaperon-right-deflection-deg">
            <input>fcs/fly-by-wire/roll/mech-bias-hyd-right</input>
            <noscale/>
            <traverse>
                <setting>
                    <position> -80.0 </position>
                    <time>      0.0 </time>
                </setting>
                <setting>
                    <position>  80.0 </position>
                    <time>      2 </time>
                </setting>
            </traverse>
            <clipto>
                <min> -23.0 </min>
                <max>  20.0 </max>
            </clipto>
        </kinematic>

        <aerosurface_scale name="fcs/fly-by-wire/roll/flaperon-right-pos-norm">
            <input>fcs/fly-by-wire/roll/flaperon-right-deflection-deg</input>
            <zero_centered> true </zero_centered>
            <domain>
                <min> -23.0 </min>
                <max>  20.0 </max>
            </domain>
            <range>
                <min> -1.0 </min>
                <max>  0.8695 </max>
            </range>
        </aerosurface_scale>

        <!--<second_order_filter name="fcs/fly-by-wire/roll/servodynamics-left">
            <description>
                (52)^2
                div
                (s^2+2(.7)(52)S+(52)^2
            </description>
            <input> fcs/fly-by-wire/roll/bottom-limit </input>
            <c1> 0 </c1>
            <c2> 0 </c2>
            <c3> 2704 </c3>
            <c4> 1 </c4>
            <c5> 72.8 </c5>
            <c6> 2704 </c6>
        </second_order_filter>-->

        <lag_filter name="fcs/fly-by-wire/roll/flaperon-left-lag">
            <description>
                Power actuator dynamics
                rate limit = 80 deg/s
            </description>
            <input> fcs/fly-by-wire/roll/bottom-limit </input>
            <c1> 20 </c1>
        </lag_filter>

        <fcs_function name="fcs/fly-by-wire/roll/mech-bias-left">
            <function>
                <sum>
                    <property> fcs/fly-by-wire/roll/flaperon-left-lag </property>
                    <value> -1.5 </value>
                </sum>
            </function>
        </fcs_function>

         <switch name="fcs/fly-by-wire/roll/mech-bias-hyd-left">
          <default value="0"/>
          <test  logic="OR" value="fcs/fly-by-wire/roll/mech-bias-left">
            systems/hydraulics/sysa-psi ge 2000
            systems/hydraulics/sysb-psi ge 2000
          </test>
         </switch>

        <kinematic name="fcs/fly-by-wire/roll/flaperon-left-deflection-deg">
            <input>fcs/fly-by-wire/roll/mech-bias-hyd-left</input>
            <noscale/>
            <traverse>
                <setting>
                    <position> -80.0 </position>
                    <time>      0.0 </time>
                </setting>
                <setting>
                    <position>  80.0 </position>
                    <time>      2 </time>
                </setting>
            </traverse>
            <clipto>
                <min> -23.0 </min>
                <max>  20.0 </max>
            </clipto>
        </kinematic>

        <aerosurface_scale name="fcs/fly-by-wire/roll/flaperon-left-pos-norm">
            <input>fcs/fly-by-wire/roll/flaperon-left-deflection-deg</input>
            <zero_centered> true </zero_centered>
            <domain>
                <min> -23.0 </min>
                <max>  20.0 </max>
            </domain>
            <range>
                <min> -1.0 </min>
                <max>  0.8695 </max>
            </range>
        </aerosurface_scale>

        <summer name="fcs/fly-by-wire/roll/inter-sum">
            <input>-fcs/fly-by-wire/roll/bottom-limit</input>
            <input>fcs/fly-by-wire/roll/top-limit</input>
        </summer>

        <pure_gain name="fcs/fly-by-wire/roll/inter-gain">
            <input>fcs/fly-by-wire/roll/inter-sum</input>
            <gain> 0.5 </gain>
        </pure_gain>

        <pure_gain name="fcs/fly-by-wire/roll/inter-schedule">
            <input>fcs/fly-by-wire/roll/inter-gain</input>
            <gain> fcs/fly-by-wire/roll/F10 </gain>
        </pure_gain>

        <summer name="fcs/fly-by-wire/roll/aileron-pos-deg">
            <input>-fcs/fly-by-wire/roll/flaperon-left-deflection-deg</input>
            <input>fcs/fly-by-wire/roll/flaperon-right-deflection-deg</input>
        </summer>

        <aerosurface_scale name="fcs/fly-by-wire/roll/aileron-pos-norm">
            <input>fcs/fly-by-wire/roll/aileron-pos-deg</input>
            <zero_centered> true </zero_centered>
            <domain>
                <min> -43 </min>
                <max>  43 </max>
            </domain>
            <range>
                <min> -1.0 </min>
                <max>  1.0 </max>
            </range>
        </aerosurface_scale>

    </channel>


    <channel execrate="1" name="Aileron Rudder Interconnect">

        <fcs_function name="fcs/fly-by-wire/ari/inverter-norm">
            <function>
                <table>
                    <independentVar lookup="row">fcs/fly-by-wire/pitch/a_f</independentVar>
                    <tableData>
                        -10   0.0
                          0   1.0
                         10   0.0
                    </tableData>
                </table>
            </function>
        </fcs_function>

        <switch name="fcs/fly-by-wire/ari/schedule-gain">
            <default value="0.65"/>
            <test logic="AND" value="1">
                fcs/fly-by-wire/prototype == 0 <!-- too much ARI from tp-1538, maybe use tp-2857 values? -->
            </test>
        </switch>

        <fcs_function name="fcs/fly-by-wire/ari/schedule">
            <function>
                <product>
                    <p> fcs/fly-by-wire/ari/inverter-norm </p>
                    <p> fcs/fly-by-wire/ari/schedule-gain </p>
                    <p> fcs/fly-by-wire/ari/F7 </p>
                </product>
            </function>
        </fcs_function>

        <switch name="fcs/fly-by-wire/ari/gain-value">
            <default value="0.0375"/>
            <test logic="AND" value="0.0750">
                fcs/fly-by-wire/prototype == 0 <!-- too much ARI from tp-1538, maybe use tp-2857 values? -->
            </test>
        </switch>

        <pure_gain name="fcs/fly-by-wire/ari/gain">
            <input>fcs/fly-by-wire/pitch/a_f</input>
            <gain> fcs/fly-by-wire/ari/gain-value </gain>
        </pure_gain>

        <summer name="fcs/fly-by-wire/ari/sum">
            <input>-fcs/fly-by-wire/ari/schedule</input>
            <input>fcs/fly-by-wire/ari/gain</input>
        </summer>

        <pure_gain name="fcs/fly-by-wire/ari/final">
            <description>
                Here the ARI result is multiplied to aileron demand,
                the result is how much ARI contributes to rudder.

                Notice that in TP-1538 the intergain has not been
                multiplied by 0.5. But thats fine due to in that
                document it is a single aileron value used,
                while here we subtract both aileron values, so
                its double.
            </description>
            <input>fcs/fly-by-wire/ari/sum</input>
            <gain> fcs/fly-by-wire/roll/inter-gain </gain>
            <gain> fcs/fly-by-wire/enable-ari </gain>
        </pure_gain>

    </channel>


    <channel execrate="1" name="Yaw">

        <fcs_function name="fcs/rudder-cmd-pow-norm">
            <function>
                    <ifthen>
                        <lt>
                            <p> fcs/rudder-cmd-norm </p>
                            <v> 0 </v>
                        </lt>
                        <product>
                            <v> -1 </v>
                            <pow>
                                <abs>
                                    <p>fcs/rudder-cmd-norm</p>
                                </abs>
                                <v>1.3</v>
                            </pow>
                        </product>
                        <pow>
                            <p>fcs/rudder-cmd-norm</p>
                            <v>1.3</v>
                        </pow>
                    </ifthen>
            </function>
        </fcs_function>

        <kinematic name="fcs/fly-by-wire/yaw/rudder-cmd-norm-kinematic">
            <description>
                Real pedals can not be moved as fast as a joystick.
                This will limit the movement speed.
            </description>
            <input>fcs/rudder-cmd-pow-norm</input>
            <noscale/>
            <traverse>
                <setting>
                    <position> -1.0 </position>
                    <time>      0.0 </time>
                </setting>
                <setting>
                    <position>  1.0  </position>
                    <time>      0.75 </time>
                </setting>
            </traverse>
        </kinematic>

        <fcs_function name="fcs/fly-by-wire/yaw/pedal-force-lbf">
            <function>
                <table>
                    <independentVar lookup="row">fcs/fly-by-wire/yaw/rudder-cmd-norm-kinematic</independentVar>
                    <tableData>
                       -1 -120
                        0    0
                        1  120
                    </tableData>
                </table>
            </function>
        </fcs_function>

        <fcs_function name="fcs/fly-by-wire/yaw/command-deg">
            <description>
                The +- 15 includes mech preload and electrical breakout.
            </description>
            <function>
                <table>
                    <independentVar lookup="row">fcs/fly-by-wire/yaw/pedal-force-lbf</independentVar>
                    <tableData>
                        -120  30.0
                         -15   0.0
                          15   0.0
                         120 -30.0
                    </tableData>
                </table>
            </function>
        </fcs_function>

        <aerosurface_scale name="fcs/fly-by-wire/yaw/trim-scaled">
            <input>fcs/yaw-trim-cmd-norm</input>
            <zero_centered> true </zero_centered>
            <domain>
                <min> -1.0 </min>
                <max>  1.0 </max>
            </domain>
            <range>
                <min> -8 </min>
                <max>  8 </max>
            </range>
        </aerosurface_scale>

        <summer name="fcs/fly-by-wire/yaw/command-sum">
            <input>fcs/fly-by-wire/yaw/trim-scaled</input>
            <input>-fcs/fly-by-wire/yaw/command-deg</input>
        </summer>

        <fcs_function name="fcs/fly-by-wire/yaw/command-schedule">
            <description>
                In Cat I TP-1538 say 20-30, but modern flight manual say 14-26.
                Here I have implemented modern values.

                TODO: Consider using aero/alpha-deg here instead of a_f.
                      TP-1538 does say it uses alpha indicated directly.
            </description>
            <function>
                <product>
                    <table>
                        <independentVar lookup="row">fcs/fly-by-wire/pitch/a_f</independentVar>
                        <independentVar lookup="column">fcs/fly-by-wire/enable-cat-III</independentVar>
                        <tableData>
                                   0           1
                             3   1.0         1.0
                            14   1.0         0.08333
                            15   0.91666     0.0
                            26   0.0         0.0
                        </tableData>
                    </table>
                    <p>fcs/fly-by-wire/yaw/command-sum</p>
                </product>
            </function>
        </fcs_function>

        <fcs_function name="fcs/fly-by-wire/yaw/control-c/command-schedule">
            <function>
                <product>
                    <table>
                        <independentVar lookup="row">fcs/fly-by-wire/pitch/control-c/roll-rate-abs</independentVar>
                        <independentVar lookup="column">fcs/fly-by-wire/enable-control-c</independentVar>
                        <tableData>
                                   0  1
                            20   1.0 1.0
                            40   1.0 0.0
                        </tableData>
                    </table>
                    <p>fcs/fly-by-wire/yaw/command-schedule</p>
                </product>
            </function>
        </fcs_function>

        <switch name="fcs/fly-by-wire/yaw/ari-input">
            <default value="fcs/fly-by-wire/ari/final"/>
            <test logic="AND" value="0">
                fcs/fly-by-wire/pitch/a_f ge 29
                fcs/fly-by-wire/prototype == 0
            </test>
        </switch>

        <switch name="fcs/fly-by-wire/yaw/command-switch">
            <default value="fcs/fly-by-wire/yaw/command-sum"/>
            <test logic="OR" value="fcs/fly-by-wire/yaw/control-c/command-schedule">
                fcs/fly-by-wire/prototype == 0
                fcs/fly-by-wire/prototype == 1 <!-- this is to allow prototype FBW to use control-c -->
            </test>
        </switch>

        <summer name="fcs/fly-by-wire/yaw/command-sum-ari">
            <input>fcs/fly-by-wire/yaw/ari-input</input>
            <input>fcs/fly-by-wire/yaw/command-switch</input>
        </summer>

        <pure_gain name="fcs/fly-by-wire/yaw/g-gain">
            <input>accelerations/a_y</input>
            <gain> 19.32 </gain>
        </pure_gain>

        <pure_gain name="velocities/r-deg_sec">
            <input>velocities/r-rad_sec</input>
            <gain> 57.2957795 </gain>
        </pure_gain>

        <pure_gain name="fcs/fly-by-wire/yaw/cross-gain">
            <input>fcs/fly-by-wire/roll/lead-exit</input>
            <gain> 0.01745 </gain><!-- deg/sec to rad/sec -->
        </pure_gain>

        <pure_gain name="fcs/fly-by-wire/yaw/cross-multiplier">
            <input>fcs/fly-by-wire/pitch/a_f</input>
            <gain> fcs/fly-by-wire/yaw/cross-gain </gain>
        </pure_gain>

        <summer name="fcs/fly-by-wire/yaw/yaw-limits-sum-1">
            <input>velocities/r-deg_sec</input>
            <input>-fcs/fly-by-wire/yaw/cross-multiplier</input>
        </summer>

        <lead_lag_filter name="fcs/fly-by-wire/yaw/lead">
          <input> fcs/fly-by-wire/yaw/yaw-limits-sum-1 </input>
          <c1> 3 </c1>
          <c2> 15 </c2>
          <c3> 1 </c3>
          <c4> 15 </c4>
        </lead_lag_filter>

        <lead_lag_filter name="fcs/fly-by-wire/yaw/lead-second">
          <input> fcs/fly-by-wire/yaw/lead </input>
          <c1> 1.5 </c1>
          <c2> 0 </c2>
          <c3> 1 </c3>
          <c4> 1 </c4>
        </lead_lag_filter>

        <summer name="fcs/fly-by-wire/yaw/yaw-limits-sum-2">
            <input>fcs/fly-by-wire/yaw/lead-second</input>
            <input>fcs/fly-by-wire/yaw/g-gain</input>
        </summer>

        <pure_gain name="fcs/fly-by-wire/yaw/schedule">
            <input>fcs/fly-by-wire/yaw/yaw-limits-sum-2</input>
            <gain> fcs/fly-by-wire/yaw/F8 </gain>
        </pure_gain>

        <pure_gain name="fcs/fly-by-wire/yaw/alt-schedule">
            <description>
                Is +0.75 in diagram.
                TODO: check the validity
            </description>
            <input> velocities/r-deg_sec </input>
            <gain> -0.75 </gain>
        </pure_gain>

        <switch name="fcs/fly-by-wire/yaw/schedule-final">
            <default value="fcs/fly-by-wire/yaw/schedule"/>
            <test logic="AND" value="fcs/fly-by-wire/yaw/alt-schedule">
                fcs/fly-by-wire/pitch/a_f ge 29
                fcs/fly-by-wire/prototype == 0
            </test>
        </switch>

        <summer name="fcs/fly-by-wire/yaw/rudder-sum">
            <input>fcs/fly-by-wire/yaw/schedule-final</input>
            <input>fcs/fly-by-wire/yaw/command-sum-ari</input>
        </summer>

        <switch name="fcs/fly-by-wire/yaw/rudder-sum-elec">
            <description>
            </description>
            <default value="fcs/fly-by-wire/yaw/rudder-sum"/>
            <test logic="AND" value="fcs/fly-by-wire/yaw/rudder-sum-elec">
                elec/bus/flcc/c lt 20
            </test>
        </switch>

        <second_order_filter name="fcs/fly-by-wire/yaw/struct-filter">
          <input> fcs/fly-by-wire/yaw/rudder-sum-elec </input>
          <c1> 1 </c1>
          <c2> 0 </c2>
          <c3> 1225 </c3>
          <c4> 1 </c4>
          <c5> 0 </c5>
          <c6> 1225 </c6>
        </second_order_filter>

        <!--<second_order_filter name="fcs/fly-by-wire/yaw/servodynamics">
            <description>
                (52)^2
                div
                (s^2+2(.7)(52)S+(52)^2
            </description>
            <input> fcs/fly-by-wire/yaw/struct-filter </input>
            <c1> 0 </c1>
            <c2> 0 </c2>
            <c3> 2704 </c3>
            <c4> 1 </c4>
            <c5> 72.8 </c5>
            <c6> 2704 </c6>
        </second_order_filter>-->

        <lag_filter name="fcs/fly-by-wire/yaw/rudder-lag">
            <description>
                Power actuator dynamics
                Rate limit = 120 deg/s
            </description>
            <input> fcs/fly-by-wire/yaw/struct-filter </input>
            <c1> 20 </c1>
        </lag_filter>

        <switch name="fcs/fly-by-wire/yaw/hyd">
          <default value="0"/>
          <test  logic="OR" value="fcs/fly-by-wire/yaw/rudder-lag">
            systems/hydraulics/sysa-psi ge 2000
            systems/hydraulics/sysb-psi ge 2000
          </test>
         </switch>

        <kinematic name="fcs/fly-by-wire/yaw/rudder-deflection-deg">
            <input>fcs/fly-by-wire/yaw/hyd</input>
            <noscale/>
            <traverse>
                <setting>
                    <position> -30.0 </position>
                    <time>      0.0 </time>
                </setting>
                <setting>
                    <position>  30.0 </position>
                    <time>      0.5 </time>
                </setting>
            </traverse>
            <clipto>
                <min> -30 </min>
                <max>  30 </max>
            </clipto>
        </kinematic>

        <aerosurface_scale name="fcs/fly-by-wire/yaw/rudder-pos-norm">
            <input>fcs/fly-by-wire/yaw/rudder-deflection-deg</input>
            <zero_centered> true </zero_centered>
            <domain>
                <min> -30.0 </min>
                <max>  30.0 </max>
            </domain>
            <range>
                <min> -1.0 </min>
                <max>  1.0 </max>
            </range>
        </aerosurface_scale>

    </channel>
    <channel execrate="1" name="Pitch">

        <fcs_function name="fcs/fly-by-wire/pitch/stick-force-lbf">
            <function>
                <table>
                    <independentVar lookup="row">fcs/elevator-cmd-norm</independentVar>
                    <tableData>
                       -1   40
                        0    0
                        1  -17.65
                    </tableData>
                </table>
            </function>
        </fcs_function>

        <fcs_function name="fcs/fly-by-wire/pitch/command-g">
            <function>
                <table>
                    <independentVar lookup="row">fcs/fly-by-wire/pitch/stick-force-lbf</independentVar>
                    <tableData>
                       -17.65  -4.0
                        -7.25  -0.44
                        -1.75   0.0
                         1.75   0.0
                         7.25   0.44
                        40.00  10.86
                    </tableData>
                </table>
            </function>
        </fcs_function>

        <aerosurface_scale name="fcs/fly-by-wire/pitch/trim-scaled">
            <input>fcs/pitch-trim-cmd-norm</input>
            <zero_centered> true </zero_centered>
            <domain>
                <min> -1.0 </min>
                <max>  1.0 </max>
            </domain>
            <range>
                <min>  2.4 </min>
                <max> -2.4 </max>
            </range>
        </aerosurface_scale>

        <summer name="fcs/fly-by-wire/pitch/command-sum">
            <input>fcs/fly-by-wire/pitch/trim-scaled</input>
            <input>fcs/fly-by-wire/pitch/command-g</input>
        </summer>

        <switch name="fcs/fly-by-wire/pitch/negative-g-limit-final">
            <description>
                The second test is for MPO switch enabled.
                Source: The Israeli document.
            </description>
            <default value="fcs/fly-by-wire/pitch/F1"/>
            <test logic="OR" value="-4">
                fcs/fly-by-wire/condition-a == 1
            </test>
            <test logic="AND" value="-4">
                fcs/fbw-override == 1
            </test>
        </switch>

        <summer name="fcs/fly-by-wire/pitch/g-limit">
            <input>fcs/fly-by-wire/pitch/command-sum</input>
            <clipto>
                <min>fcs/fly-by-wire/pitch/negative-g-limit-final</min>
                <max>8.0</max>
            </clipto>
        </summer>

        <switch name="fcs/fly-by-wire/pitch/g-limit-product">
            <description>
                The second test is for MPO switch enabled.
                Source: The Israeli document.
            </description>
            <default value="0.5"/>
            <test logic="AND" value="1.0">
                fcs/fly-by-wire/MLG-GND == 1
            </test>
            <test logic="AND" value="1.0">
                fcs/fbw-override == 1
                aero/alpha-deg   gt 29
            </test>
        </switch>

        <switch name="fcs/fly-by-wire/pitch/g-gain">
            <default value="1"/>
            <test logic="AND" value="2">
                fcs/fly-by-wire/prototype == 0
            </test>
        </switch>

        <pure_gain name="fcs/fly-by-wire/pitch/g-limit-product-gain">
            <input>fcs/fly-by-wire/pitch/g-limit-product</input>
            <gain> fcs/fly-by-wire/pitch/g-gain </gain>
        </pure_gain>

        <pure_gain name="fcs/fly-by-wire/pitch/g-limit-gain">
            <input>fcs/fly-by-wire/pitch/g-limit</input>
            <gain> fcs/fly-by-wire/pitch/g-limit-product-gain </gain>
        </pure_gain>

        <lag_filter name="fcs/fly-by-wire/pitch/command-sum-limit-lagged">
            <input> fcs/fly-by-wire/pitch/g-limit-gain </input>
            <c1> 8.3 </c1>
        </lag_filter>

        <!--<pure_gain name="fcs/fly-by-wire/pitch/alpha">
            <input>aero/alpha-deg</input>
            <gain> fcs/fly-by-wire/enable-alpha </gain>
        </pure_gain>-->

        <summer name="fcs/fly-by-wire/pitch/alpha-indicated-clamp">
            <input>aero/alpha-deg</input><!-- should really be indicated -->
            <clipto>
                <min>-5</min>
                <max>30</max>
            </clipto>
        </summer>

        <switch name="fcs/fly-by-wire/pitch/alpha-indicated-switch">
            <default value="fcs/fly-by-wire/pitch/alpha-indicated-clamp"/>
            <test logic="AND" value="0">
                fcs/fly-by-wire/MLG-GND == 1
            </test>
        </switch>

        <fcs_function name="fcs/fly-by-wire/pitch/control-c/roll-rate-abs">
            <function>
                <abs>
                    <product>
                        <property> velocities/p-rad_sec </property>
                        <v> 57.29577951308233 </v>
                    </product>
                </abs>
            </function>
        </fcs_function>

        <pure_gain name="fcs/fly-by-wire/pitch/control-c/roll-rate-gain">
            <input>fcs/fly-by-wire/pitch/control-c/roll-rate-abs</input>
            <gain> 0.15 </gain>
        </pure_gain>

        <lag_filter name="fcs/fly-by-wire/pitch/control-c/roll-rate-lagged">
            <input> fcs/fly-by-wire/pitch/control-c/roll-rate-gain </input>
            <c1> 0.67 </c1>
        </lag_filter>

        <fcs_function name="fcs/fly-by-wire/pitch/control-c/roll-rate-schedule">
            <function>
                <table>
                    <independentVar lookup="row">fcs/fly-by-wire/pitch/control-c/roll-rate-lagged</independentVar>
                    <tableData>
                          3      0
                        8.4    5.4
                    </tableData>
                </table>
            </function>
        </fcs_function>

        <pure_gain name="fcs/fly-by-wire/pitch/control-c/da_p">
            <description>
                I just named this control-c since it uses the
                same enable switch, its really control-b.

                da_p is factored in 3 places in pitch system.
                      Purpose is to reduce inertia-coupling pitch-out departures
                      when rolling at high angle of attack.
                      its not used in yaw, ari or roll.
            </description>
            <input> fcs/fly-by-wire/pitch/control-c/roll-rate-schedule </input>
            <gain> fcs/fly-by-wire/enable-control-c </gain>
        </pure_gain>

        <lag_filter name="fcs/fly-by-wire/pitch/a_f">
            <description>
                        Exit A
            </description>
            <input> fcs/fly-by-wire/pitch/alpha-indicated-switch </input>
            <c1> 10 </c1>
        </lag_filter>

        <summer name="fcs/fly-by-wire/pitch/alpha-sum">
            <description></description>
            <input> fcs/fly-by-wire/pitch/a_f </input>
            <input> fcs/fly-by-wire/pitch/control-c/da_p </input>
        </summer>

        <switch name="fcs/fly-by-wire/pitch/alpha-indicated-mpo">
            <description>
                The test is for MPO switch enabled.
                Source: The Israeli document.

                Since this is part of pitch limiter scheme it
                uses alpha-sum instead of a_f.
            </description>
            <default value="fcs/fly-by-wire/pitch/alpha-sum"/>
            <test logic="AND" value="0"><!-- consider to lag this 0 -->
                fcs/fbw-override == 1
                aero/alpha-deg   gt 29
            </test>
        </switch>

        <fcs_function name="fcs/fly-by-wire/pitch/alpha-reduction">
            <function>
                <table>
                    <independentVar lookup="row">fcs/fly-by-wire/enable-cat-III</independentVar>
                    <independentVar lookup="column">inertia/weight-lbs</independentVar>
                    <tableData>
                                25000 30000 35000
                          0     -20.4 -20.4 -20.4
                          1     -11.6 -12.4 -13.4
                    </tableData>
                </table>
            </function>
        </fcs_function>

        <fcs_function name="fcs/fly-by-wire/pitch/alpha-indicated-sum">
            <function>
                <sum>
                    <property> fcs/fly-by-wire/pitch/alpha-indicated-mpo </property>
                    <p> fcs/fly-by-wire/pitch/alpha-reduction </p>
                    <property> fcs/fly-by-wire/pitch/pitch-rate-gain </property>
                </sum>
            </function>
        </fcs_function>

        <switch name="fcs/fly-by-wire/pitch/alpha-gain">
            <default value="0.5"/>
            <test logic="AND" value="1">
                fcs/fly-by-wire/prototype == 0
            </test>
        </switch>

        <pure_gain name="fcs/fly-by-wire/pitch/alpha-indicated-gain">
            <description></description>
            <input>fcs/fly-by-wire/pitch/alpha-indicated-sum</input>
            <gain> fcs/fly-by-wire/pitch/alpha-gain </gain>
            <clipto>
                <min> 0 </min>
                <max>10000</max>
            </clipto>
        </pure_gain>

        <summer name="fcs/fly-by-wire/pitch/command-sum-limit-alpha">
            <input> -fcs/fly-by-wire/pitch/command-sum-limit-lagged </input>
            <input> fcs/fly-by-wire/pitch/alpha-indicated-gain </input>
            <input> -autoflight/pitch/g-demand-switched </input>
        </summer>

        <summer name="fcs/fly-by-wire/pitch/command-sum-limit-alpha-pitch">
            <input> fcs/fly-by-wire/pitch/command-sum-limit-alpha </input>
            <input> fcs/fly-by-wire/pitch/pitch-rate-lead-2nd </input>
        </summer>

        <switch name="fcs/fly-by-wire/pitch/main-gain">
            <description>
            </description>
            <default value="3.0"/>
            <test logic="AND" value="1.5">
                fcs/fly-by-wire/prototype == 0
            </test>
        </switch>

        <pure_gain name="fcs/fly-by-wire/pitch/main-gain-result">
            <input>fcs/fly-by-wire/pitch/command-sum-limit-alpha-pitch</input>
            <gain> fcs/fly-by-wire/pitch/main-gain </gain>
        </pure_gain>

        <!--<switch name="fcs/fly-by-wire/pitch/loop-schedule">
            <description>
            </description>
            <default value="fcs/fly-by-wire/pitch/F3"/>
            <test logic="AND" value="fcs/fly-by-wire/pitch/F3-loop-alt">
                fcs/fly-by-wire/prototype == 0
            </test>
        </switch>-->

        <pure_gain name="fcs/fly-by-wire/pitch/main-gain-schedule">
            <description>
            </description>
            <input>fcs/fly-by-wire/pitch/main-gain-result</input>
            <gain> fcs/fly-by-wire/pitch/F3 </gain>
        </pure_gain>

        <summer name="fcs/fly-by-wire/pitch/integrator-feedback">
            <input> fcs/fly-by-wire/pitch/main-gain-schedule </input>
            <input> -fcs/fly-by-wire/pitch/integrator-feedback-gain </input>
        </summer>

        <switch name="fcs/fly-by-wire/pitch/integrator-feedback-mlg">
            <default value="fcs/fly-by-wire/pitch/integrator-feedback"/>
            <test logic="AND" value="fcs/fly-by-wire/pitch/ground-input">
                fcs/fly-by-wire/MLG-GND == 1
            </test>
        </switch>

        <summer name="fcs/fly-by-wire/pitch/integrator-pre">
            <input> fcs/fly-by-wire/pitch/integrator-feedback-mlg </input>
            <input> -fcs/fly-by-wire/pitch/amplifier </input>
            <input> -fcs/fly-by-wire/pitch/int-balance </input>
        </summer>

        <integrator name="fcs/fly-by-wire/pitch/integrator">
            <input> fcs/fly-by-wire/pitch/integrator-pre </input>
            <c1> 5 </c1>
        </integrator>

        <pure_gain name="fcs/fly-by-wire/pitch/ground-input">
            <description>
                Diagram say 0.5, but negative makes more sense.
                Negative will limit the integrator action when on ground.
            </description>
            <input>fcs/fly-by-wire/pitch/integrator</input>
            <gain> -0.5 </gain>
        </pure_gain>

        <deadband name="fcs/fly-by-wire/pitch/amp-deadzone">
          <input> fcs/fly-by-wire/pitch/integrator </input>
          <width> 50 </width>
        </deadband>

        <pure_gain name="fcs/fly-by-wire/pitch/amplifier">
            <input>fcs/fly-by-wire/pitch/amp-deadzone</input>
            <gain> fcs/fly-by-wire/K_A </gain>
        </pure_gain>

        <summer name="fcs/fly-by-wire/pitch/integrator-post">
            <input> fcs/fly-by-wire/pitch/integrator </input>
            <input> fcs/fly-by-wire/pitch/main-gain-schedule </input>
        </summer>

        <pure_gain name="fcs/fly-by-wire/pitch/integrator-selftest">
            <input>fcs/fly-by-wire/pitch/integrator-post</input>
            <gain> fcs/fly-by-wire/integrator-selftest-value </gain>
        </pure_gain>

        <summer name="fcs/fly-by-wire/pitch/int-balance-summer">
            <description></description>
            <input> fcs/fly-by-wire/pitch/integrator-post </input>
            <input> -fcs/fly-by-wire/pitch/integrator-selftest </input>
        </summer>

        <pure_gain name="fcs/fly-by-wire/pitch/int-balance">
            <input>fcs/fly-by-wire/pitch/int-balance-summer</input>
            <gain> 0.5 </gain>
        </pure_gain>

        <!--<summer name="fcs/fly-by-wire/pitch/pitch-loop-gain-sum-int-sum-sum">
            <input> fcs/fly-by-wire/pitch/integrator-post </input>
            <input> fcs/fly-by-wire/pitch/alpha-feedback </input>
        </summer>-->

        <deadband name="fcs/fly-by-wire/pitch/integrator-feedback-deadzone">
            <description>
                         It deceptionally looks like 23 on diagram.
                         But it +-25 since that the actuatorlimit.
            </description>
            <input> fcs/fly-by-wire/pitch/integrator-almost-final </input>
            <width> 50 </width>
        </deadband>

        <pure_gain name="fcs/fly-by-wire/pitch/integrator-feedback-gain">
            <input>fcs/fly-by-wire/pitch/integrator-feedback-deadzone</input>
            <gain> 5 </gain>
        </pure_gain>

        <pure_gain name="fcs/fly-by-wire/pitch/alpha-feedback">
            <description>
                         Since this is part of pitch limiter scheme it
                         uses alpha-sum instead of a_f.
            </description>
            <input>fcs/fly-by-wire/pitch/alpha-sum</input>
            <gain> fcs/fly-by-wire/pitch/F2 </gain>
        </pure_gain>

        <summer name="fcs/fly-by-wire/pitch/integrator-almost-final">
            <input> fcs/fly-by-wire/pitch/integrator-post </input>
            <input> fcs/fly-by-wire/pitch/alpha-feedback </input>
        </summer>

        <summer name="fcs/fly-by-wire/pitch/integrator-final">
            <input> fcs/fly-by-wire/pitch/alpha-feedback </input>
            <input> fcs/fly-by-wire/pitch/integrator-selftest </input>
        </summer>

        <switch name="fcs/fly-by-wire/pitch/integrator-final-elec">
            <description>
            </description>
            <default value="fcs/fly-by-wire/pitch/integrator-final"/>
            <test logic="AND" value="fcs/fly-by-wire/pitch/integrator-final-elec">
                elec/bus/flcc/a lt 20
            </test>
        </switch>

        <!--<pure_gain name="fcs/fly-by-wire/pitch/q">
            <input>velocities/q-rad_sec</input>
            <gain> fcs/fly-by-wire/enable-q </gain>
        </pure_gain>-->

        <pure_gain name="velocities/q-deg_sec">
            <input>velocities/q-rad_sec</input>
            <gain> 57.2957795 </gain>
        </pure_gain>

        <washout_filter name="fcs/fly-by-wire/pitch/q-washout">
          <input> velocities/q-deg_sec </input>
          <c1> 1 </c1>
        </washout_filter>

        <pure_gain name="fcs/fly-by-wire/pitch/q-gain-1">
            <input>fcs/fly-by-wire/pitch/q-washout</input>
            <gain> 0.7 </gain>
        </pure_gain>

        <!--<switch name="fcs/fly-by-wire/pitch/q-schedule">
            <description>
            </description>
            <default value="fcs/fly-by-wire/pitch/F3"/>
            <test logic="AND" value="fcs/fly-by-wire/pitch/F3-rate-alt">
                fcs/fly-by-wire/prototype == 0
            </test>
        </switch>-->

        <pure_gain name="fcs/fly-by-wire/pitch/pitch-rate-gain">
            <input>fcs/fly-by-wire/pitch/q-gain-1</input>
            <gain> fcs/fly-by-wire/pitch/F3 </gain>
        </pure_gain>

        <switch name="fcs/fly-by-wire/pitch/bias-top">
            <default value="6"/>
            <test logic="AND" value="0">
                fcs/fly-by-wire/MLG-GND == 1
            </test>
        </switch>

        <fcs_function name="fcs/fly-by-wire/pitch/bias-number">
            <function>
                <table>
                    <independentVar lookup="row">fcs/fly-by-wire/enable-cat-III</independentVar>
                    <independentVar lookup="column">velocities/vc-kts</independentVar>
                    <tableData>
                          100 420
                        0   9   9
                        1   1   9
                    </tableData>
                </table>
            </function>
        </fcs_function>

        <switch name="fcs/fly-by-wire/pitch/bias-bottom">
            <default value="0"/>
            <test logic="AND" value="fcs/fly-by-wire/pitch/bias-number">
                fcs/fly-by-wire/condition-a == 1
            </test>
        </switch>

        <lag_filter name="fcs/fly-by-wire/pitch/bias-top-lag">
            <input> fcs/fly-by-wire/pitch/bias-top </input>
            <c1> 10 </c1>
        </lag_filter>

        <lag_filter name="fcs/fly-by-wire/pitch/bias-bottom-lag">
            <description>
                Diagram say 0.125
            </description>
            <input> fcs/fly-by-wire/pitch/bias-bottom </input>
            <c1> 12.5 </c1>
        </lag_filter>

        <summer name="fcs/fly-by-wire/pitch/bias1">
            <input> -fcs/fly-by-wire/pitch/bias-bottom-lag </input>
            <input> fcs/fly-by-wire/pitch/bias-number </input>
        </summer>

        <summer name="fcs/fly-by-wire/pitch/bias-final">
            <description>
                This is fixed 15 in TP-1538
            </description>
            <input> fcs/fly-by-wire/pitch/bias-top-lag </input>
            <input> fcs/fly-by-wire/pitch/bias1 </input>
        </summer>

        <summer name="fcs/fly-by-wire/pitch/pitch-rate-gain-sum">
            <description>
                         Since this is part of pitch limiter scheme it
                         uses alpha-sum instead of a_f.
            </description>
            <input>fcs/fly-by-wire/pitch/alpha-sum</input>
            <input> fcs/fly-by-wire/pitch/pitch-rate-gain </input>
            <input> -fcs/fly-by-wire/pitch/bias-final </input>
        </summer>

        <switch name="fcs/fly-by-wire/pitch/pitch-gain">
            <default value="0.161"/>
            <test logic="AND" value="0.322">
                fcs/fly-by-wire/prototype == 0
            </test>
        </switch>

        <pure_gain name="fcs/fly-by-wire/pitch/pitch-rate-gain-sum-gain">
            <input>fcs/fly-by-wire/pitch/pitch-rate-gain-sum</input>
            <gain> fcs/fly-by-wire/pitch/pitch-gain </gain>
        </pure_gain>

        <pure_gain name="fcs/fly-by-wire/pitch/pitch-rate-upper">
            <input>fcs/fly-by-wire/pitch/pitch-rate-gain-sum-gain</input>
            <gain> 1 </gain>
            <clipto>
                <min> 0 </min>
                <max>10000</max>
            </clipto>
        </pure_gain>

        <pure_gain name="fcs/fly-by-wire/pitch/pitch-rate-lower">
            <input>fcs/fly-by-wire/pitch/pitch-rate-gain-sum-gain</input>
            <gain> 1 </gain>
            <clipto>
                <min> -10000 </min>
                <max> 0 </max>
            </clipto>
        </pure_gain>

        <switch name="fcs/fly-by-wire/pitch/pitch-rate-lower-switch">
            <description>
                Is 1.0 or 10 in diagram, but does not make sense to me.
            </description>
            <default value="0"/>
            <test logic="AND" value="0.1">
                fcs/fly-by-wire/condition-a == 1
            </test>
        </switch>

        <lag_filter name="fcs/fly-by-wire/pitch/pitch-rate-lower-lag">
            <description>
                Diagram say 0.125, but that does a pitch up for too long after takeoff
            </description>
            <input> fcs/fly-by-wire/pitch/pitch-rate-lower-switch </input>
            <c1> 12.5 </c1>
        </lag_filter>

        <pure_gain name="fcs/fly-by-wire/pitch/pitch-rate-lower-gain">
            <input>fcs/fly-by-wire/pitch/pitch-rate-lower</input>
            <gain> fcs/fly-by-wire/pitch/pitch-rate-lower-lag </gain>
        </pure_gain>

        <summer name="fcs/fly-by-wire/pitch/pitch-rate-gain-sum-gain-sum">
            <input> fcs/fly-by-wire/pitch/pitch-rate-upper </input>
            <input> fcs/fly-by-wire/pitch/pitch-rate-lower-gain </input>
            <input> fcs/fly-by-wire/pitch/pitch-rate-gain-2-sum </input>
        </summer>

        <fcs_function name="fcs/fly-by-wire/pitch/normal-1">
            <function>
                    <!--<p>fcs/fly-by-wire/enable-nz</p>-->
                    <difference>
                        <property> accelerations/a_n </property>
                        <value> 1 </value>
                    </difference>
            </function>
        </fcs_function>

        <switch name="fcs/fly-by-wire/pitch/normal-1-special">
            <description>This prevents NaN to propagate through the system</description>
            <default value="0"/>
            <test logic="AND" value="fcs/fly-by-wire/pitch/normal-1">
                accelerations/a_n lt  30
                accelerations/a_n gt -30
            </test>
        </switch>

        <switch name="fcs/fly-by-wire/pitch/normal-gain-value">
            <default value="0.5"/>
            <test logic="AND" value="1">
                fcs/fly-by-wire/prototype == 0
            </test>
        </switch>

        <pure_gain name="fcs/fly-by-wire/pitch/normal-gain">
            <input>fcs/fly-by-wire/pitch/normal-1-special</input>
            <gain> fcs/fly-by-wire/pitch/normal-gain-value </gain>
        </pure_gain>

        <summer name="fcs/fly-by-wire/pitch/pitch-rate-gain-2-sum">
            <input> fcs/fly-by-wire/pitch/normal-gain </input>
            <input> fcs/fly-by-wire/pitch/q-gain-2 </input>
        </summer>

        <switch name="fcs/fly-by-wire/pitch/q-product">
            <default value="0.167"/>
            <test logic="AND" value="0.231">
                fcs/fly-by-wire/MLG-GND == 1
            </test>
        </switch>

        <switch name="fcs/fly-by-wire/pitch/q-product-gain">
            <default value="1"/>
            <test logic="AND" value="2">
                fcs/fly-by-wire/prototype == 0
            </test>
        </switch>

        <pure_gain name="fcs/fly-by-wire/pitch/q-product-final">
            <input>fcs/fly-by-wire/pitch/q-product</input>
            <gain> fcs/fly-by-wire/pitch/q-product-gain </gain>
        </pure_gain>

        <pure_gain name="fcs/fly-by-wire/pitch/q-gain-2">
            <input>fcs/fly-by-wire/pitch/q-washout</input>
            <gain> fcs/fly-by-wire/pitch/q-product-final </gain>
        </pure_gain>

        <lead_lag_filter name="fcs/fly-by-wire/pitch/pitch-rate-lead">
            <input> fcs/fly-by-wire/pitch/pitch-rate-gain-sum-gain-sum </input>
            <c1> 3 </c1>
            <c2> 12 </c2>
            <c3> 1 </c3>
            <c4> 12 </c4>
        </lead_lag_filter>

        <second_order_filter name="fcs/fly-by-wire/pitch/pitch-rate-lead-2nd">
            <description>
                on old diagram looks to be 2.5, not 2 nor 25
            </description>
            <input> fcs/fly-by-wire/pitch/pitch-rate-lead </input>
            <c1> 2.5 </c1>
            <c2> 20 </c2>
            <c3> 3500 </c3>
            <c4> 1 </c4>
            <c5> 40 </c5>
            <c6> 3500 </c6>
        </second_order_filter>

        <summer name="fcs/fly-by-wire/pitch/right-sum">
            <input> fcs/fly-by-wire/pitch/integrator-final-elec </input>
            <input> fcs/fly-by-wire/roll/inter-schedule </input>
        </summer>

        <summer name="fcs/fly-by-wire/pitch/left-sum">
            <input> fcs/fly-by-wire/pitch/integrator-final-elec </input>
            <input> -fcs/fly-by-wire/roll/inter-schedule </input>
        </summer>

        <switch name="fcs/fly-by-wire/pitch/right-hyd">
          <default value="0"/>
          <test  logic="OR" value="fcs/fly-by-wire/pitch/right-sum">
            systems/hydraulics/sysa-psi ge 2000
            systems/hydraulics/sysb-psi ge 2000
          </test>
         </switch>

         <switch name="fcs/fly-by-wire/pitch/left-hyd">
          <default value="0"/>
          <test  logic="OR" value="fcs/fly-by-wire/pitch/left-sum">
            systems/hydraulics/sysa-psi ge 2000
            systems/hydraulics/sysb-psi ge 2000
          </test>
         </switch>

        <!-- servos -->

        <!--<second_order_filter name="fcs/fly-by-wire/pitch/right-servo">
            <description>
                Ref.: TN D-8176
                Servodynamics
                Disabled due to too slow to react to changes?
            </description>
            <input> fcs/fly-by-wire/pitch/right-hyd </input>
            <c1> 0 </c1>
            <c2> 0 </c2>
            <c3> 2704 </c3>
            <c4> 1 </c4>
            <c5> 72.8 </c5>
            <c6> 2704 </c6>
        </second_order_filter>

        <second_order_filter name="fcs/fly-by-wire/pitch/left-servo">
            <input> fcs/fly-by-wire/pitch/left-hyd </input>
            <c1> 0 </c1>
            <c2> 0 </c2>
            <c3> 2704 </c3>
            <c4> 1 </c4>
            <c5> 72.8 </c5>
            <c6> 2704 </c6>
        </second_order_filter>-->

        <lag_filter name="fcs/fly-by-wire/pitch/right-lag">
            <description>Power actuator dynamics</description>
            <input> fcs/fly-by-wire/pitch/right-hyd </input>
            <c1> 20 </c1>
        </lag_filter>

        <lag_filter name="fcs/fly-by-wire/pitch/left-lag">
            <description>Power actuator dynamics</description>
            <input> fcs/fly-by-wire/pitch/left-hyd </input>
            <c1> 20 </c1>
        </lag_filter>

        <kinematic name="fcs/fly-by-wire/pitch/horz-tail-right-deflection-deg">
            <description>
                defl. limit = 25, rate limit = 60 deg/s
            </description>
            <input>fcs/fly-by-wire/pitch/right-lag</input>
            <noscale/>
            <traverse>
                <setting>
                    <position> -25.0 </position>
                    <time>      0.0 </time>
                </setting>
                <setting>
                    <position>  25.0 </position>
                    <time>      0.8333 </time>
                </setting>
            </traverse>
            <clipto>
                <min> -25 </min>
                <max>  25 </max>
            </clipto>
        </kinematic>

        <kinematic name="fcs/fly-by-wire/pitch/horz-tail-left-deflection-deg">
            <input>fcs/fly-by-wire/pitch/left-lag</input>
            <noscale/>
            <traverse>
                <setting>
                    <position> -25.0 </position>
                    <time>      0.0 </time>
                </setting>
                <setting>
                    <position>  25.0 </position>
                    <time>      0.8333 </time>
                </setting>
            </traverse>
            <clipto>
                <min> -25 </min>
                <max>  25 </max>
            </clipto>
        </kinematic>

        <!-- resulting deflection for aerodynamics -->

        <summer name="fcs/fly-by-wire/pitch/horz-tail-deflection-combined-deg">
            <input> fcs/fly-by-wire/pitch/horz-tail-left-deflection-deg </input>
            <input> fcs/fly-by-wire/pitch/horz-tail-right-deflection-deg </input>
        </summer>

        <pure_gain name="fcs/fly-by-wire/pitch/horz-tail-deflection-deg">
            <input>fcs/fly-by-wire/pitch/horz-tail-deflection-combined-deg</input>
            <gain> 0.5 </gain>
        </pure_gain>

        <aerosurface_scale name="fcs/fly-by-wire/pitch/horz-tail-deflection-norm">
          <input>fcs/fly-by-wire/pitch/horz-tail-deflection-deg</input>
          <domain>
            <min>-25</min>
            <max>25</max>
          </domain>
          <range>
            <min>-1</min>
            <max>1</max>
          </range>
        </aerosurface_scale>

        <fcs_function name="fcs/fly-by-wire/pitch/block15-horz-tail-factor">
            <description>
                Block-15 and above had the horizontal tail surface enlarged
                by 25% for better control. This data does not factor that in
                so do it ourselves.

                Basically larger value will make the deep stall worse.
            </description>
            <function>
                <table>
                    <independentVar lookup="row">fcs/fly-by-wire/pitch/horz-tail-deflection-deg</independentVar>
                    <tableData>
                     -25.0      1.25
                      0.0       1.0
                      25.0      1.25
                    </tableData>
                </table>
            </function>
        </fcs_function>

    </channel>


    <channel name="Throttle" execrate="1">

        <fcs_function name="fcs/fly-by-wire/throttle/pos-norm">
            <description>Page 153 of secondary doc. And F-16.net. The 0.35 is a guesstimate.</description>
            <function>
                <table>
                    <independentVar lookup="row">fcs/throttle-cmd-norm</independentVar>
                    <independentVar lookup="column">velocities/mach</independentVar>
                    <tableData>
                                0.84 1.00 1.40
                      0.00      0.00 0.35 1.00
                      0.77      1.00 1.00 1.00
                      1.00      2.00 2.00 2.00
                    </tableData>
                </table>
            </function>
            <output>fcs/throttle-pos-norm</output>
        </fcs_function>

        <fcs_function name="/controls/engines/engine[0]/throttle-movement">
            <description></description>
            <function>
                <table>
                    <independentVar lookup="row">/controls/engines/engine[0]/throttle</independentVar>
                    <independentVar lookup="column">/f16/engine/cutoff-release-lever</independentVar>
                    <tableData>
                                  0    1
                      0.0       0.05   0
                      1.0       1.0    0
                    </tableData>
                </table>
            </function>
        </fcs_function>

    </channel>


    <channel execrate="1" name="Leading edge flaps">

        <!-- TN D-8176 has an alternative LEF schedule, consider trying it, even though it older than TP-1538,
             simply cause TP-1538 is a simplified schedule.
             ADA189675 has the real schedule, but its unreadable, sadly. -->

        <lead_lag_filter name="fcs/fly-by-wire/lef/lead-lag">
          <input> aero/alpha-deg </input>
          <c1> 2 </c1>
          <c2> 7.25 </c2>
          <c3> 1 </c3>
          <c4> 7.25 </c4>
        </lead_lag_filter>

        <pure_gain name="fcs/fly-by-wire/lef/alpha-gain">
            <input>fcs/fly-by-wire/lef/lead-lag</input>
            <gain>1.38</gain>
        </pure_gain>

        <fcs_function name="fcs/fly-by-wire/lef/cmd-pos">
            <function>
                <min>
                    <v>25</v>
                    <max>
                        <v>0</v>
                        <sum>
                            <p>fcs/fly-by-wire/lef/alpha-gain</p>
                            <product>
                                <value>-9.05</value>
                                <p>fcs/fly-by-wire/qcps-ratio</p>
                            </product>
                            <v>1.45</v>
                        </sum>
                    </max>
                </min>
            </function>
        </fcs_function>

        <switch name="fcs/fly-by-wire/lef/cmd-pos-elec">
            <description>
            </description>
            <default value="fcs/fly-by-wire/lef/cmd-pos"/>
            <test logic="AND" value="fcs/fly-by-wire/lef/cmd-pos-elec">
                elec/bus/flcc/d lt 20
            </test>
        </switch>

        <lag_filter name="fcs/fly-by-wire/lef/servo">
            <input> fcs/fly-by-wire/lef/cmd-pos-elec </input>
            <c1> 0.136 </c1>
        </lag_filter>

        <switch name="fcs/fly-by-wire/lef/pos-hyd">
          <default value="0"/>
          <test  logic="OR" value="fcs/fly-by-wire/lef/servo">
            systems/hydraulics/sysa-psi ge 2000
            systems/hydraulics/sysb-psi ge 2000
          </test>
         </switch>

        <kinematic name="fcs/fly-by-wire/lef/lef-pos-deg">
            <input>fcs/fly-by-wire/lef/pos-hyd</input>
            <noscale/>
            <traverse>
                <setting>
                    <position>0</position>
                    <time>0.0</time>
                </setting>
                <setting>
                    <position>25</position>
                    <time>1</time><!-- 25 degs per second -->
                </setting>
            </traverse>
            <clipto>
                <min>0</min>
                <max>25</max>
            </clipto>
        </kinematic>

        <pure_gain name="fcs/fly-by-wire/lef/lef-pos-rad">
            <input>fcs/fly-by-wire/lef/lef-pos-deg</input>
            <gain>0.017453</gain>
        </pure_gain>

        <aerosurface_scale name="fcs/fly-by-wire/lef/lef-pos-norm">
            <input>fcs/fly-by-wire/lef/lef-pos-deg</input>
            <zero_centered> true </zero_centered>
            <domain>
                <min> 0 </min>
                <max> 25 </max>
            </domain>
            <range>
                <min>0</min>
                <max>1</max>
            </range>
        </aerosurface_scale>

        <fcs_function name="fcs/fly-by-wire/lef/lef-pos-r-norm">
            <description>Inversed normalized LEF. Used in aero.</description>
            <function>
                <difference>
                    <v>1</v>
                    <p>fcs/fly-by-wire/lef/lef-pos-norm</p>
                </difference>
            </function>
        </fcs_function>

    </channel>


    <channel name="Trailing edge flaps">

        <switch name="fcs/fly-by-wire/tef/cmd-gear">
            <default value="0"/>
            <test logic="AND" value="1">
                gear/gear-cmd-norm == 1
            </test>
        </switch>

        <switch name="fcs/fly-by-wire/tef/cmd-switch">
            <default value="fcs/fly-by-wire/tef/cmd-gear"/>
            <test logic="AND" value="1">
                /controls/flight/flaps gt 0
            </test>
        </switch>

        <fcs_function name="fcs/fly-by-wire/tef/cmd">
            <function>
                <product>
                    <p>fcs/fly-by-wire/tef/cmd-switch</p>
                    <table>
                        <independentVar lookup="row">velocities/vc-kts</independentVar>
                        <tableData>
                            250 20
                            370  0
                        </tableData>
                    </table>
                </product>
            </function>
        </fcs_function>

        <summer name="fcs/fly-by-wire/tef/F9-limit">
            <input> fcs/fly-by-wire/tef/F9 </input>
            <clipto>
                <min> -2 </min>
                <max>  2 </max>
            </clipto>
        </summer>

        <summer name="fcs/fly-by-wire/tef/sum">
            <input> fcs/fly-by-wire/tef/cmd </input>
            <input> -fcs/fly-by-wire/tef/int </input>
            <input> fcs/fly-by-wire/tef/F9-limit </input>
            <clipto>
                <min> -0.625 </min>
                <max>  0.625 </max>
            </clipto>
        </summer>

        <integrator name="fcs/fly-by-wire/tef/int">
            <input> fcs/fly-by-wire/tef/sum </input>
            <c1> 8 </c1>
        </integrator>

        <switch name="fcs/fly-by-wire/tef/int-elec">
            <description>
            </description>
            <default value="fcs/fly-by-wire/tef/int"/>
            <test logic="AND" value="fcs/fly-by-wire/tef/int-elec">
                elec/bus/flcc/d lt 20
            </test>
        </switch>

        <switch name="fcs/fly-by-wire/tef/hyd">
          <default value="0"/>
          <test  logic="OR" value="fcs/fly-by-wire/tef/int-elec">
            systems/hydraulics/sysa-psi ge 2000
            systems/hydraulics/sysb-psi ge 2000
          </test>
         </switch>

        <fcs_function name="fcs/fly-by-wire/tef/tef-pos-deg">
            <function>
                <sum>
                    <property> fcs/fly-by-wire/tef/hyd </property>
                    <value> 1.5 </value>
                </sum>
            </function>
        </fcs_function>

        <pure_gain name="fcs/fly-by-wire/tef/tef-pos-norm">
            <description>Using integrator output as mechanical bias should not be feed into aerodynamics</description>
            <input>fcs/fly-by-wire/tef/hyd</input>
            <gain>0.05</gain>
        </pure_gain>

        <pure_gain name="fcs/fly-by-wire/tef/tef-pos-deg-hud">
            <description>This value should be displayed in HUD.</description>
            <input>fcs/fly-by-wire/tef/tef-pos-norm</input>
            <gain>20</gain>
        </pure_gain>

    </channel>


    <channel name="YF-16 Fly-by-wire mappings to model">

        <pure_gain name="fcs/fly-by-wire/model/rudder-pos-norm">
            <description>One to one</description>
            <input>fcs/fly-by-wire/yaw/rudder-pos-norm</input>
            <gain>1</gain>
            <output>fcs/rudder-pos-norm</output>
        </pure_gain>

        <pure_gain name="fcs/fly-by-wire/model/dht-right-pos-rad">
            <description>Degrees to radians</description>
            <input>fcs/fly-by-wire/pitch/horz-tail-right-deflection-deg</input>
            <gain>0.017453</gain>
            <output>fcs/dht-right-pos-rad</output>
        </pure_gain>

        <pure_gain name="fcs/fly-by-wire/model/dht-left-pos-rad">
            <description>Degrees to -radians</description>
            <input>fcs/fly-by-wire/pitch/horz-tail-left-deflection-deg</input>
            <gain>-0.017453</gain>
            <output>fcs/dht-left-pos-rad</output>
            <output>fcs/elevator-pos-norm</output>
        </pure_gain>

        <pure_gain name="fcs/fly-by-wire/model/left-aileron-pos-norm">
            <description>Degrees to 21.5 degrees</description>
            <input>fcs/fly-by-wire/roll/flaperon-left-deflection-deg</input>
            <gain>0.0465</gain>
            <output>fcs/left-aileron-pos-norm</output>
        </pure_gain>

        <pure_gain name="fcs/fly-by-wire/model/right-aileron-pos-norm">
            <description>Degrees to 21.5 degrees.</description>
            <input>fcs/fly-by-wire/roll/flaperon-right-deflection-deg</input>
            <gain>0.0465</gain>
            <output>fcs/right-aileron-pos-norm</output>
        </pure_gain>

        <pure_gain name="fcs/fly-by-wire/model/left-flaperon-norm">
            <description>Degrees to -20 degrees</description>
            <input>fcs/fly-by-wire/roll/flaperon-left-deflection-deg</input>
            <gain>-0.05</gain>
            <output>fcs/left-flaperon-norm</output>
        </pure_gain>

        <pure_gain name="fcs/fly-by-wire/model/right-flaperon-norm">
            <description>Degrees to 20 degrees</description>
            <input>fcs/fly-by-wire/roll/flaperon-right-deflection-deg</input>
            <gain>0.05</gain>
            <output>fcs/right-flaperon-norm</output>
        </pure_gain>

        <pure_gain name="fcs/fly-by-wire/model/lef-pos-deg">
            <description>One to one</description>
            <input>fcs/fly-by-wire/lef/lef-pos-deg</input>
            <gain>1</gain>
            <output>fcs/lef-pos-deg</output>
            <output>/surface-positions/flap-pos-norm</output>
        </pure_gain>

        <!-- the below components rounds flaps position in degrees to zero decimal points: -->

        <fcs_function name="fcs/fly-by-wire/model/flap-pos-deg-with-frac">
            <function>
                <product>
                    <v>0.1</v>
                    <integer>
                        <product>
                            <v>10</v>
                            <p>fcs/fly-by-wire/tef/tef-pos-deg-hud</p>
                        </product>
                    </integer>
                </product>
            </function>
        </fcs_function>

        <fcs_function name="fcs/fly-by-wire/model/flap-pos-deg-frac">
            <function>
                <fraction>
                      <p>fcs/fly-by-wire/model/flap-pos-deg-with-frac</p>
                </fraction>
            </function>
        </fcs_function>

        <switch name="fcs/fly-by-wire/model/flap-pos-deg-frac-add">
            <default value="0"/>
            <test logic="AND" value="1">
                fcs/fly-by-wire/model/flap-pos-deg-frac ge 0.5
            </test>
            <test logic="AND" value="-1">
                fcs/fly-by-wire/model/flap-pos-deg-frac le -0.5
            </test>
        </switch>

        <fcs_function name="fcs/fly-by-wire/model/flap-pos-deg-final">
            <function>
                <sum>
                    <integer>
                        <p>fcs/fly-by-wire/tef/tef-pos-deg-hud</p>
                    </integer>
                    <p>fcs/fly-by-wire/model/flap-pos-deg-frac-add</p>
                </sum>
            </function>
            <output>fcs/flap-pos-deg</output>
        </fcs_function>

    </channel>
<!-- end: control system by Nikolai V. Chr. -->


  <channel name="Landing Gear">

   <switch name="fcs/gear-wow">
    <default value="0"/>
    <test logic="AND" value="1">
     gear/unit[1]/WOW eq 1
     gear/unit[2]/WOW eq 1
    </test>
   </switch>

   <switch name="fcs/gear-wow-cmd-norm">
        <!-- prevent gear up command while wheels on ground. Block 50 manual page 1-70 -->
      <default value="gear/gear-cmd-norm"/>
      <test  logic="OR" value="1">
        fcs/gear-wow == 1
      </test>
   </switch>

   <switch name="fcs/gear-hyd">
      <default value="fcs/gear-control"/>
      <test  logic="OR" value="fcs/gear-wow-cmd-norm">
        systems/hydraulics/sysb-psi ge 2000
      </test>
   </switch>

   <kinematic name="fcs/gear-control">
    <input>fcs/gear-hyd</input>
    <traverse>
     <setting>
      <position>0</position>
      <time>0</time>
     </setting>
     <setting>
      <position>1</position>
      <time>5</time>
     </setting>
    </traverse>
    <output>gear/gear-pos-norm</output>
   </kinematic>

   <scheduled_gain name="fcs/scheduled-steer-pos-deg">
    <input>fcs/steer-cmd-norm</input>
    <table>
     <independentVar lookup="row">velocities/vg-fps</independentVar>
     <independentVar lookup="column">elec/bus/emergency-dc-1</independentVar>
     <tableData>
            0 20
       1.0  0  10.0
      10.0  0  32.0
      20.0  0  15.0
      50.0  0   4.5
      100.0 0   2.0
      150.0 0   1.0
      300.0 0   0.5
     </tableData>
    </table>
    <output>fcs/steer-pos-deg</output>
   </scheduled_gain>

  </channel>


  <channel name="Speedbrake">
   <!--
     - To prevent deep stall the Flight Computer commands speedbrake
     - deflection at high angle of attack (alpha) and low speeds. This
     - will provide just enough pitch down moment to keep the aircraft
     - under control.
     -->
   <switch name="fcs/speedbrake-alpha-limiter">
    <default value="0"/>
    <test logic="AND" value="1">
     aero/alpha-deg ge 53
     velocities/v-fps le 18
     fcs/fly-by-wire/MLG-GND == 0
    </test>
   </switch>

   <switch name="fcs/speedbrake-initiate">
    <default value="0"/>
    <test logic="OR" value="1">
     fcs/speedbrake-alpha-limiter eq 1
     fcs/speedbrake-cmd-norm eq 1
    </test>
   </switch>

   <!--
     - Speedbrake deflection is limited to 43 degrees (instead of 60
     - degrees) when the gear is extended to prevent physical
     - speedbrake damage on touchdown.
     -->
   <scheduled_gain name="fcs/speedbrake-scheduler">
    <input>fcs/speedbrake-initiate</input>
    <table>
     <independentVar>gear/gear-cmd-norm</independentVar>
     <tableData>
      0 1.0
      1 0.71667
     </tableData>
    </table>
    <!-- <output>fcs/speedbrake-pos-norm</output> -->
   </scheduled_gain>

   <switch name="fcs/speedbrake-hyd">
     <default value="0"/>
     <test  logic="AND" value="fcs/speedbrake-scheduler">
       systems/hydraulics/sysa-psi ge 2000
       elec/bus/emergency-dc-1 gt 20
     </test>
    </switch>

   <kinematic name="fcs/speedbrake-control">
    <input>fcs/speedbrake-hyd</input>
    <traverse>
     <setting>
      <position>0</position>
      <time>0</time>
     </setting>
     <setting>
      <position>60</position>
      <time>2</time>                                      <!-- 2 seconds to deploy -->
     </setting>
    </traverse>
    <output>fcs/speedbrake-pos-deg</output>
   </kinematic>

     <aerosurface_scale name="fcs/speedbrake-position-normalizer">
     <input>fcs/speedbrake-control</input>
     <domain>
        <min>0</min>
        <max>60</max>
     </domain>
     <range>
        <min>0</min>
        <max>1</max>
     </range>
     <output>fcs/speedbrake-pos-norm</output>
   </aerosurface_scale>

  </channel>

  <channel name="Hook">

   <kinematic name="fcs/hook-control">
    <input>fcs/hook-engage</input>
    <traverse>
     <setting>
      <position>0</position>
      <time>0</time>
     </setting>
     <setting>
      <position>1</position>
      <time>2.5</time>
     </setting>
    </traverse>
    <output>fcs/hook-pos-norm</output>
   </kinematic>

  </channel>

  <channel name="Canopy">

   <switch name="fcs/canopy-trigger">
    <default value="fcs/canopy-engage"/>
    <test logic="AND" value="fcs/canopy-trigger">
        elec/bus/emergency-dc-2 lt 20
        elec/switches/main-pwr gt 0
    </test>
    <test logic="AND" value="fcs/canopy-trigger">
        elec/sources/battery-volt lt 20
        elec/switches/main-pwr == 0
    </test>
    <test value="0">
     velocities/u-fps gt 1.0
    </test>
   </switch>

   <kinematic name="fcs/canopy-control">
    <input>fcs/canopy-trigger</input>
    <traverse>
     <setting>
      <position>0</position>
      <time>0</time>
     </setting>
     <setting>
      <position>1</position>
      <time>10</time>
     </setting>
    </traverse>
    <output>fcs/canopy-pos-norm</output>
    <output>/canopy/position-norm</output>
   </kinematic>

  </channel>

  <!--<channel name="Gun">
    <switch name="fcs/guntrigger">
    <default value="0"/>
    <test logic="AND" value="1">
         /controls/armament/trigger eq 1
         systems/hydraulics/sysb-psi ge 2000
    </test>
    </switch>
  </channel>-->

    <channel name="Misc" execrate="16">

        <fcs_function name="systems/approach-speed">
            <description>Page A7-3 of Supplement HAF manual</description>
            <function>
                <table>
                    <independentVar lookup="row">inertia/weight-lbs</independentVar>
                    <tableData>
                      17000 125
                      20000 136
                      25000 152
                      30000 167
                      35000 180
                      40000 192
                      45000 204
                      48000 212
                    </tableData>
                </table>
            </function>
        </fcs_function>

        <fcs_function name="systems/buffeting/outputy">
            <function>
                <product>
                    <sum>
                        <sin>
                          <product>
                            <property>sim-time-sec</property>
                            <property>systems/buffeting/var1</property>
                          </product>
                        </sin>
                        <sin>
                          <product>
                            <property>sim-time-sec</property>
                            <property>systems/buffeting/var2</property>
                          </product>
                        </sin>
                        <sin>
                          <product>
                            <property>sim-time-sec</property>
                            <property>systems/buffeting/var3</property>
                          </product>
                        </sin>
                    </sum>
                    <!--<table>
                        <independentVar lookup="row">atmosphere/density-altitude</independentVar>
                        <tableData>
                              0.0         1.0
                          30000.0         0.0
                        </tableData>
                    </table>-->
                    <property>systems/buffeting/magnitude</property>
                </product>
            </function>
        </fcs_function>

        <fcs_function name="systems/buffeting/outputz">
            <function>
                <product>
                    <sum>
                        <sin>
                          <product>
                            <property>sim-time-sec</property>
                            <property>systems/buffeting/var1</property>
                            <v>776.345</v>
                          </product>
                        </sin>
                        <sin>
                          <product>
                            <property>sim-time-sec</property>
                            <property>systems/buffeting/var2</property>
                            <v>736.345</v>
                          </product>
                        </sin>
                        <sin>
                          <product>
                            <property>sim-time-sec</property>
                            <property>systems/buffeting/var3</property>
                            <v>756.345</v>
                          </product>
                        </sin>
                    </sum>
                    <!--<table>
                        <independentVar lookup="row">atmosphere/density-altitude</independentVar>
                        <tableData>
                              0.0         1.0
                          30000.0         0.0
                        </tableData>
                    </table>-->
                    <property>systems/buffeting/magnitude</property>
                </product>
            </function>
        </fcs_function>

        <switch name="/f16/avionics/power-ufc-warming">
         <default value="0"/>
         <test  logic="AND" value="1">
           /f16/avionics/power-ufc == 1
           elec/bus/ess-ac gt 100
         </test>
        </switch>

        <kinematic name="/f16/avionics/power-ufc-warm">
            <input>/f16/avionics/power-ufc-warming</input>
            <noscale/>
            <traverse>
                <setting>
                    <position>  0.0 </position>
                    <time>      0.0 </time>
                </setting>
                <setting>
                    <position>  1.0 </position>
                    <time>      5.0 </time>
                </setting>
            </traverse>
            <clipto>
                <min>   0 </min>
                <max>   1 </max>
            </clipto>
        </kinematic>

        <switch name="/f16/avionics/power-rdr-alt-warming">
         <default value="0"/>
         <test  logic="AND" value="2">
           /f16/avionics/power-rdr-alt == 2
           elec/bus/ess-dc gt 20
         </test>
         <test  logic="AND" value="1">
           /f16/avionics/power-rdr-alt == 1
           elec/bus/ess-dc gt 20
         </test>
        </switch>

        <kinematic name="avionics/power-rdr-alt-warm">
            <input>/f16/avionics/power-rdr-alt-warming</input>
            <noscale/>
            <traverse>
                <setting>
                    <position>  0.0 </position>
                    <time>      0.0 </time>
                </setting>
                <setting>
                    <position>  1.0 </position>
                    <time>     60.0 </time>
                </setting>
                <setting>
                    <position>  2.0 </position>
                    <time>      0.1 </time>
                </setting>
            </traverse>
            <clipto>
                <min>   0 </min>
                <max>   2 </max>
            </clipto>
            <output>/f16/avionics/power-rdr-alt-warm</output>
        </kinematic>

        <switch name="/f16/avionics/power-fcr-warming">
         <default value="0"/>
         <test  logic="AND" value="1">
           /f16/avionics/power-fcr == 1
           elec/bus/noness-dc gt 20
           elec/contactors/main-contactors-1 gt 100
         </test>
        </switch>

        <kinematic name="avionics/power-fcr-warm">
            <input>/f16/avionics/power-fcr-warming</input>
            <noscale/>
            <traverse>
                <setting>
                    <position>  0.0 </position>
                    <time>      0.0 </time>
                </setting>
                <setting>
                    <position>  1.0 </position>
                    <time>    120.0 </time><!-- if change this then change the countdown in MFD CRM also -->
                </setting>
            </traverse>
            <clipto>
                <min>   0 </min>
                <max>   1 </max>
            </clipto>
            <output>/f16/avionics/power-fcr-warm</output>
        </kinematic>

        <switch name="/f16/avionics/power-fcr-bit">
         <default value="0"/>
         <test logic="AND" value="0">
           /f16/avionics/power-fcr-warming == 0
         </test>
         <test logic="AND" value="2">
           /f16/avionics/power-fcr-warm == 1
         </test>
         <test logic="AND" value="1">
           /f16/avionics/power-fcr-warm gt 0
           /f16/avionics/power-fcr-warming == 1
         </test>
        </switch>

        <switch name="/f16/avionics/power-right-hdpt-warming">
         <default value="0"/>
         <test  logic="AND" value="1">
           /f16/avionics/power-right-hdpt == 1
           elec/bus/ess-dc gt 20
           /f16/stores/tgp-mounted gt 0
         </test>
        </switch>

        <kinematic name="avionics/power-right-hdpt-warm">
            <input>/f16/avionics/power-right-hdpt-warming</input>
            <noscale/>
            <traverse>
                <setting>
                    <position>  0.0 </position>
                    <time>      0.0 </time>
                </setting>
                <setting>
                    <position>  1.0 </position>
                    <time>    180.0 </time>
                </setting>
            </traverse>
            <clipto>
                <min>   0 </min>
                <max>   1 </max>
            </clipto>
            <output>/f16/avionics/power-right-hdpt-warm</output>
        </kinematic>

    </channel>

    <channel name="sound" execrate="8">

        <fcs_function name="/engines/engine[0]/sound-n2-70-to-90">
            <function>
                <table>
                    <independentVar lookup="row">/engines/engine/n2</independentVar>
                    <tableData>
                          70         -1.0
                          90          1.0
                    </tableData>
                </table>
            </function>
        </fcs_function>

        <fcs_function name="/engines/engine[0]/sound-n2-vol-a">
            <function>
                <sqrt>
                    <product>
                        <v>0.5</v>
                        <sum>
                            <v>1</v>
                            <p>/engines/engine[0]/sound-n2-70-to-90</p>
                        </sum>
                    </product>
                </sqrt>
            </function>
        </fcs_function>

        <fcs_function name="/engines/engine[0]/sound-n2-vol-b">
            <function>
                <sqrt>
                    <product>
                        <v>0.5</v>
                        <difference>
                            <v>1</v>
                            <p>/engines/engine[0]/sound-n2-70-to-90</p>
                        </difference>
                    </product>
                </sqrt>
            </function>
        </fcs_function>

        <fcs_function name="/engines/engine[0]/n2-low"><!-- replaced with JFS sound -->
            <function>
                <table>
                    <independentVar lookup="row">/engines/engine/n2</independentVar>
                    <tableData>
                          0.1         0.0
                          1.0         0.1
                         25.0         1.0
                         35.0         0.75
                         45.0         0.0
                    </tableData>
                </table>
            </function>
        </fcs_function>

        <fcs_function name="/engines/engine[0]/n1-out1">
            <function>
                <table>
                    <independentVar lookup="row">/engines/engine/n1</independentVar>
                    <tableData>
                           0.5        0.0
                          15          1.0
                          30          1.0
                          40          0.0
                    </tableData>
                </table>
            </function>
        </fcs_function>

        <fcs_function name="/engines/engine[0]/n1-out2">
            <function>
                <table>
                    <independentVar lookup="row">/engines/engine/n1</independentVar>
                    <tableData>
                           0.5        0.0
                           5          0.2
                          10          0.55
                          15          1.0
                          30          1.0
                         100          0.3
                    </tableData>
                </table>
            </function>
        </fcs_function>

        <fcs_function name="/engines/engine[0]/n1-mid">
            <function>
                <table>
                    <independentVar lookup="row">/engines/engine/n1</independentVar>
                    <tableData>
                           5.5        0.0
                          10          0.75
                          15          1.0
                    </tableData>
                </table>
            </function>
        </fcs_function>

        <fcs_function name="/engines/engine[0]/n1-high">
            <function>
                <table>
                    <independentVar lookup="row">/engines/engine/n1</independentVar>
                    <tableData>
                          10          0.0
                          30          1.0
                    </tableData>
                </table>
            </function>
        </fcs_function>

        <lag_filter name="/f16/fuel/hand-fwd-lag">
            <input> /f16/fuel/hand-fwd </input>
            <c1> 2 </c1>
        </lag_filter>

        <lag_filter name="/f16/fuel/hand-aft-lag">
            <input> /f16/fuel/hand-aft </input>
            <c1> 1 </c1>
        </lag_filter>


        <fcs_function name="propulsion/engine[0]/ftit-direct">
            <function>
                <sum>
                    <table>
                        <independentVar lookup="row">/engines/engine/n2</independentVar>
                        <independentVar lookup="column">/damage/fire/serviceable</independentVar>
                        <tableData>
                                           0      1
                               0          600      0
                              20          800    300
                              40         1000    600
                              60         1200    650
                              80         1200    700
                             100         1200    750
                        </tableData>
                    </table>
                    <product>
                        <value>250</value>
                        <min>
                            <value>1</value>
                            <quotient>
                                <property>/engines/engine/thrust_lb</property>
                                <property>/engines/engine/rated-mil-dry</property>
                            </quotient>
                        </min>
                    </product>
                </sum>
            </function>
        </fcs_function>

        <lag_filter name="names/ftit-c">
            <input> propulsion/engine[0]/ftit-direct </input>
            <c1> 0.35 </c1>
            <output>/engines/engine[0]/ftit-degc</output>
        </lag_filter>

    </channel>

 </flight_control>
