<?xml version="1.0"?>
<?xml-stylesheet type="text/xsl" href="http://jsbsim.sourceforge.net/JSBSim.xsl"?>
<fdm_config name="General Dynamics YF-16" version="2.0" release="ALPHA"
 xmlns:xsi="http://www.w3.org/2001/XMLSchema-instance"
 xsi:noNamespaceSchemaLocation="http://jsbsim.sourceforge.net/JSBSim.xsd">

 <fileheader>
  <author> Erik Hofman, Nikolai V. Chr. </author>
  <filecreationdate> 2001-12-28 </filecreationdate>
  <version> $Revision: 1.93 $ </version>
  <license>
   <licenseName>GPL (General Public License)</licenseName>
   <licenseURL>http://www.gnu.org/licenses/gpl.html</licenseURL>
  </license>
  <description> Models an YF-16 </description>
  <note>
   This model was created using data that is, or has been, publically
   available by means of technical reports, textbooks, image graphs or
   published code. This aircraft description file is in no way related
   to the manufacturer of the real aircraft.
   Neither the name of (any of) the authors nor the names of (any of) the
   manufacturers may be used to endorse or promote products derived from
   this file.

   The data is provided ''as is'' and any express or implied
   warranties, including, but not limitted to the implied warranties of
   merchantability and fitness for a particular purpose are disclaimed.
  </note>
  <reference refID="ISBN 0-7232-3458-2" author="William Green" title="General Dynamics F-16 Dash-1" date="1987"/>
  <reference refID="NASA TP-1538" author="Nguyen, L. T.; Ogburn, M. E.; Gilbert, W. P.; Kibler, K. S.; Brown, P. W.; Deal, P. L."
    title="Simulator study of stall/post-stall characteristics of a fighter airplane with relaxed longitudinal static stability." date="12/1979"/>
  <reference refID="AD A 055417" author="Marchand,Michael A" title="Pitch Rate Flight Control for the F-16 Aircraft to Improve Air-To-Air Combat" date="Dec 1977"/>
  <reference refID="AD A 189675" author="Kassan, Mark W" title="F-16 Simulator for Man-in-the-Loop Testing of Aircraft Control Systems (SIMTACS)" date="Dec 1987"/>
  <reference refID="AFD-070827-032" author="Goddard and Lemm" title="Simulation of the F-16 Lantirn Automatic Terrain Avoidance System" date="Aug 1986"/>
  <reference refID="NASA TN-D-8176" author="Gilbert, W. P.; Nguyen, L. T.; Vangunst, R. W."
    title="Simulator study of the effectiveness of an automatic control system designed to improve the high-angle-of-attack characteristics of a fighter airplane" date="1976"/>
  <reference refID="NASA TP-2857" author="Dale A. Mackall" title="Development and flight test experiences with a flight-crucial digital control system" date="1988"/>
  <reference refID="PW-100 Engine" author="Elodie Roux" title="Turbofan and Turbojet Engines: Database Handbook" date="2007"/>
  <reference refID="Manual" author="Lockheed Martin" title="F-16C/D Block 50 Flight Manual" date="2 December 1996"/>
  <reference refID="Youtube video showing speed brake actuation time (2 secs)" author="MultiplyLeadership's channel"
    title="Air-to-air chase video of F-16 AB light off FTT" date="Oct 20, 2010"/>
  <reference refID="None" author="Richard Murray" title="http://www.cds.caltech.edu/~murray/projects/afosr95-vehicles/models/f16/" date="n/a"/>
  <reference refID="H-1999" author="NASA" title="Dynamic ground effects flight test of an F-15 aircraft" date="n/a"/>
  <reference refID="H-2177" author="NASA" title="Dynamic ground effect for a Cranked Arrow Wing Airplane" date="n/a"/>
  <reference refID="None" author="n/a" title="http://www.codeonemagazine.com/archives/1991/articles/jul_91/july2a_91.html" date="n/a"/>
  <reference refID="F16i post stall" author="Moshe Medina" title="Post stall characteristics of highly augmented fighter aircraft" date="n/a"/>
 </fileheader>

 <metrics>
  <wingarea unit="FT2"> 300 </wingarea>
  <wingspan unit="FT"> 30 </wingspan>
  <chord unit="FT"> 11.32 </chord>
  <htailarea unit="FT2"> 63.7 </htailarea>
  <htailarm unit="FT"> 16.46 </htailarm>
  <vtailarea unit="FT2"> 54.75 </vtailarea>
  <vtailarm unit="FT"> 0 </vtailarm>
  <location name="AERORP" unit="IN">
   <x> -181.9336 </x><!-- -180.4336 = static margin of -4%mac -->
   <y> 0 </y>
   <z> 0 </z>
  </location>
  <location name="EYEPOINT" unit="IN">
   <x> -336.2 </x>
   <y> 0 </y>
   <z> 29.5 </z>
  </location>
  <location name="VRP" unit="IN">
   <x> -180 </x><!-- -4.572 meter -->
   <y> 0 </y>
   <z> 0 </z>
  </location>
 </metrics>

 <mass_balance>
  <ixx unit="SLUG*FT2"> 9496 </ixx>
  <iyy unit="SLUG*FT2"> 55814 </iyy>
  <izz unit="SLUG*FT2"> 63100 </izz>
  <ixy unit="SLUG*FT2"> 0 </ixy>
  <ixz unit="SLUG*FT2"> 982 </ixz>
  <iyz unit="SLUG*FT2"> 0 </iyz>
  <emptywt unit="LBS"> 17400 </emptywt>
  <location name="CG" unit="IN">
   <x> -176.5 </x><!-- 35%mac = -176.5in with VRP applied; measured by Richard in Blender. Offset -2in due to gears not correct in model? -->
   <y> 0 </y>
   <z> 0 </z>
  </location>
  <pointmass name="Pilot">
   <weight unit="LBS"> 159 </weight>
   <location name="POINTMASS" unit="IN">
    <x> -336.2 </x>
    <y> 0 </y>
    <z> 0 </z>
   </location>
  </pointmass>

  <pointmass name="pylon1">
   <weight unit="LBS"> 0 </weight>
   <location name="POINTMASS" unit="M">
    <x> -4.490 </x>
    <y> -4.79412 </y>
    <z> 0.01109 </z>
   </location>
  </pointmass>

  <pointmass name="pylon2">
   <weight unit="LBS"> 0 </weight>
   <location name="POINTMASS" unit="M">
    <x> -4.490 </x>
    <y> -3.95167 </y>
    <z> -0.25696 </z>
   </location>
  </pointmass>

  <pointmass name="pylon3">
   <weight unit="LBS"> 0 </weight>
   <location name="POINTMASS" unit="M">
    <x> -4.490 </x>
    <y> -2.88034 </y>
    <z> -0.25696 </z>
   </location>
  </pointmass>

  <pointmass name="pylon4">
   <weight unit="LBS"> 0 </weight>
   <location name="POINTMASS" unit="M">
    <x> -4.490 </x>
    <y> -1.62889 </y>
    <z> -0.25696 </z>
   </location>
  </pointmass>

  <pointmass name="pylon5">
   <weight unit="LBS"> 0 </weight>
   <location name="POINTMASS" unit="M">
    <x> -4.490 </x>
    <y> 0 </y>
    <z> -0.83778 </z>
   </location>
  </pointmass>

  <pointmass name="pylon6">
   <weight unit="LBS"> 0 </weight>
   <location name="POINTMASS" unit="M">
    <x> -4.490 </x>
    <y> 1.62889 </y>
    <z> -0.25696 </z>
   </location>
  </pointmass>

  <pointmass name="pylon7">
   <weight unit="LBS"> 0 </weight>
   <location name="POINTMASS" unit="M">
    <x> -4.490 </x>
    <y> 2.88034 </y>
    <z> -0.25696 </z>
   </location>
  </pointmass>

  <pointmass name="pylon8">
   <weight unit="LBS"> 0 </weight>
   <location name="POINTMASS" unit="M">
    <x> -4.490 </x>
    <y> 3.95167 </y>
    <z> -0.25696 </z>
   </location>
  </pointmass>

  <pointmass name="pylon9">
   <weight unit="LBS"> 0 </weight>
   <location name="POINTMASS" unit="M">
    <x> -4.490 </x>
    <y> 4.79412 </y>
    <z> 0.01109 </z>
   </location>
  </pointmass>

 </mass_balance>

 <ground_reactions>
  <contact type="BOGEY" name="NOSE_LG">
   <location unit="IN">
    <x> -299.6 </x>
    <y> 0 </y>
    <z> -72 </z>
   </location>
   <static_friction> 0.8 </static_friction>
   <dynamic_friction> 0.5 </dynamic_friction>
   <rolling_friction> 0.02 </rolling_friction>
   <spring_coeff unit="LBS/FT"> 17250 </spring_coeff>
   <damping_coeff unit="LBS/FT/SEC"> 4250 </damping_coeff>
   <max_steer unit="DEG"> 32 </max_steer><!-- as per manual -->
   <brake_group> NOSE </brake_group>
   <retractable>1</retractable>
  </contact>
  <contact type="BOGEY" name="LEFT_MLG">
   <location unit="IN">
    <x> -158.6 </x>
    <y> -48 </y>
    <z> -71.6 </z>
   </location>
   <static_friction> 0.8 </static_friction>
   <dynamic_friction> 0.5 </dynamic_friction>
   <rolling_friction> 0.02 </rolling_friction>
   <spring_coeff unit="LBS/FT"> 37500 </spring_coeff>
   <damping_coeff unit="LBS/FT/SEC"> 7500 </damping_coeff>
   <max_steer unit="DEG"> 0.0 </max_steer>
   <brake_group> LEFT </brake_group>
   <retractable>1</retractable>
  </contact>
  <contact type="BOGEY" name="RIGHT_MLG">
   <location unit="IN">
    <x> -158.6 </x>
    <y> 48 </y>
    <z> -71.6 </z>
   </location>
   <static_friction> 0.8 </static_friction>
   <dynamic_friction> 0.5 </dynamic_friction>
   <rolling_friction> 0.02 </rolling_friction>
   <spring_coeff unit="LBS/FT"> 37500 </spring_coeff>
   <damping_coeff unit="LBS/FT/SEC"> 7500 </damping_coeff>
   <max_steer unit="DEG"> 0.0 </max_steer>
   <brake_group> RIGHT </brake_group>
   <retractable>1</retractable>
  </contact>
  <contact type="STRUCTURE" name="LEFT_WT">
   <location unit="IN">
    <x> -121.3 </x>
    <y> -189 </y>
    <z> 0 </z>
   </location>
   <static_friction> 5.0 </static_friction>
   <dynamic_friction> 4.0 </dynamic_friction>
   <spring_coeff unit="LBS/FT"> 10000 </spring_coeff>
   <damping_coeff unit="LBS/FT/SEC"> 2000 </damping_coeff>
   <damping_coeff_rebound unit="LBS/FT/SEC"> 40000 </damping_coeff_rebound>
  </contact>
  <contact type="STRUCTURE" name="RIGHT_WT">
   <location unit="IN">
    <x> -121.3 </x>
    <y> 189 </y>
    <z> 0 </z>
   </location>
   <static_friction> 5.0 </static_friction>
   <dynamic_friction> 4.0 </dynamic_friction>
   <spring_coeff unit="LBS/FT"> 10000 </spring_coeff>
   <damping_coeff unit="LBS/FT/SEC"> 2000 </damping_coeff>
   <damping_coeff_rebound unit="LBS/FT/SEC"> 40000 </damping_coeff_rebound>
  </contact>
  <contact type="STRUCTURE" name="TOP_VS">
   <location unit="IN">
    <x> -27.2 </x>
    <y> 0 </y>
    <z> 123.2 </z>
   </location>
   <static_friction> 5.0 </static_friction>
   <dynamic_friction> 4.0 </dynamic_friction>
   <spring_coeff unit="LBS/FT"> 10000 </spring_coeff>
   <damping_coeff unit="LBS/FT/SEC"> 2000 </damping_coeff>
   <damping_coeff_rebound unit="LBS/FT/SEC"> 40000 </damping_coeff_rebound>
  </contact>
  <contact type="STRUCTURE" name="LEFT_VFT">
   <location unit="IN">
    <x> -97.6 </x>
    <y> -24.8 </y>
    <z> -52 </z>
   </location>
   <static_friction> 5.0 </static_friction>
   <dynamic_friction> 4.0 </dynamic_friction>
   <spring_coeff unit="LBS/FT"> 10000 </spring_coeff>
   <damping_coeff unit="LBS/FT/SEC"> 2000 </damping_coeff>
   <damping_coeff_rebound unit="LBS/FT/SEC"> 40000 </damping_coeff_rebound>
  </contact>
  <contact type="STRUCTURE" name="RIGHT_VFT">
   <location unit="IN">
    <x> -97.6 </x>
    <y> 24.8 </y>
    <z> -52 </z>
   </location>
   <static_friction> 5.0 </static_friction>
   <dynamic_friction> 4.0 </dynamic_friction>
   <spring_coeff unit="LBS/FT"> 10000 </spring_coeff>
   <damping_coeff unit="LBS/FT/SEC"> 2000 </damping_coeff>
   <damping_coeff_rebound unit="LBS/FT/SEC"> 40000 </damping_coeff_rebound>
  </contact>
  <contact type="STRUCTURE" name="INTAKE">
   <location unit="IN">
    <x> -322.4 </x>
    <y> 0 </y>
    <z> -36.6 </z>
   </location>
   <static_friction> 5.0 </static_friction>
   <dynamic_friction> 4.0 </dynamic_friction>
   <spring_coeff unit="LBS/FT"> 10000 </spring_coeff>
   <damping_coeff unit="LBS/FT/SEC"> 2000 </damping_coeff>
   <damping_coeff_rebound unit="LBS/FT/SEC"> 40000 </damping_coeff_rebound>
  </contact>
  <contact type="STRUCTURE" name="RADOME">
   <location unit="IN">
    <x> -486.6 </x>
    <y> 0 </y>
    <z> -8.7 </z>
   </location>
   <static_friction> 5.0 </static_friction>
   <dynamic_friction> 4.0 </dynamic_friction>
   <spring_coeff unit="LBS/FT"> 10000 </spring_coeff>
   <damping_coeff unit="LBS/FT/SEC"> 2000 </damping_coeff>
   <damping_coeff_rebound unit="LBS/FT/SEC"> 40000 </damping_coeff_rebound>
  </contact>
 </ground_reactions>

 <external_reactions>
   <force name="pushback" frame="BODY">
  <location unit="IN">
    <x>  -2.98081 </x>
    <y> 0.0 </y>
    <z>  -1.9683 </z>
  </location>
  <direction>
    <x>1</x>
    <y>0</y>
    <z>0</z>
  </direction>
   </force>

   <force name="hook" frame="BODY">
  <location unit="IN">
    <x>  100.669 </x>
    <y> 0.0 </y>
    <z>  -28.818 </z>
  </location>
  <direction>
    <x>  -0.9995 </x>
    <y>   0.0 </y>
    <z>   0.01 </z>
  </direction>
   </force>
 </external_reactions>

 <system file="pushback">
   <property>/sim/model/pushback/kp</property>
   <property>/sim/model/pushback/ki</property>
   <property>/sim/model/pushback/kd</property>
 </system>
 <system file="hook"/>
 <system file="f16-hydraulics"/>

 <flight_control file="Systems/jsb-controls"/>
 <propulsion file="Systems/jsb-propulsion-block1"/>
 <aerodynamics file="Systems/jsb-aerodynamics-block1.xml"/>


<!--
<output name="c:/users/nikolai/documents/f16_datalog.csv" type="CSV" rate="120">
 <property> fcs/fly-by-wire/pitch/q-washout </property>
 <property> velocities/q-aero-deg_sec </property>-->
 <!--<property> attitude/phi-rad </property>
 <property> position/h-sl-ft </property>
 <property> velocities/vc-kts </property>
 <property> fcs/throttle-cmd-norm </property>
 <property> fcs/elevator-cmd-norm </property>
 <property> fcs/pitch-trim-cmd-norm </property>
 <property> propulsion/total-fuel-lbs </property>
 <property> flight-path/gamma-rad </property>
 <property> accelerations/n-pilot-z-norm </property>
 <rates> ON </rates>
 <velocities> ON </velocities>
 <forces> ON </forces>
 <moments> ON </moments>
 <position> ON </position>
 <fcs> ON </fcs>
 <propulsion> OFF </propulsion>
 <aerosurfaces> ON </aerosurfaces>
 <fcs> ON </fcs>
 <ground_reactions> ON </ground_reactions>-->
<!--</output>-->

</fdm_config>


<!--
<output name="c:/users/nikolai/documents/f16_datalog.csv" type="CSV" rate="120">
 <property> fcs/fly-by-wire/pitch/q-washout </property>
 <property> velocities/q-aero-deg_sec </property>-->
 <!--<property> attitude/phi-rad </property>
 <property> position/h-sl-ft </property>
 <property> velocities/vc-kts </property>
 <property> fcs/throttle-cmd-norm </property>
 <property> fcs/elevator-cmd-norm </property>
 <property> fcs/pitch-trim-cmd-norm </property>
 <property> propulsion/total-fuel-lbs </property>
 <property> flight-path/gamma-rad </property>
 <property> accelerations/n-pilot-z-norm </property>
 <rates> ON </rates>
 <velocities> ON </velocities>
 <forces> ON </forces>
 <moments> ON </moments>
 <position> ON </position>
 <fcs> ON </fcs>
 <propulsion> OFF </propulsion>
 <aerosurfaces> ON </aerosurfaces>
 <fcs> ON </fcs>
 <ground_reactions> ON </ground_reactions>-->
<!--</output>-->

</fdm_config>
